*Heading
** Job name: C5-WIKC-TopRot Model name: C5-FS-TopRot-WIKC
** Generated by: Abaqus/CAE 6.14-1
*Preprint, echo=NO, model=NO, history=NO, contact=NO
** ----------------------------------------------------------------
**
** PART INSTANCE: top_segment
**
*Node
      1,           0.,  -299.649994,           0.
      2,           0.,  -299.649994,         800.
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*Element, type=S4R
  1,   1,  13, 293,  86
  2,  13,  14, 294, 293
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*Nset, nset=top_segment__PickedSet2
    1,    2,    3,    4,    5,    6
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*Elset, elset=top_segment__PickedSet2, generate
   1,  896,    1
*Nset, nset=top_segment__G3
    1,    2,    7,    8,   13,   14
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*Elset, elset=top_segment__G3, generate
  897,  1664,     1
*Nset, nset=top_segment_shell_top_nodes
   2,   3,   6,   8,   9,  12
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*Elset, elset=top_segment_shell_top_nodes
  32,  64,  96, 128, 160, 192
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*Nset, nset=top_segment_shell_bot_nodes
   1,   4,   5,   7,  10,  11
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*Elset, elset=top_segment_shell_bot_nodes
    1,   33,   65,   97,  129,  161
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** Section: flange_section
*Shell Section, elset=top_segment__PickedSet2, material=steel_chabouche-flange-orig, controls=EC-1
27.1, 5
** Section: web_section
*Shell Section, elset=top_segment__G3, material=steel_chabouche-web-orig, controls=EC-1
17.6, 5
** ----------------------------------------------------------------
**
** PART INSTANCE: beam_segment-1
**
*System
          0.,          0.,        800., 6.12323399573677e-17,          0.,        801.
          0.,          1.,        800.
*Node
   1750,           0.,           0.,           0.
   1751,        1150.,           0.,           0.
   1752,        2300.,           0.,           0.
   1753,         575.,           0.,           0.
   1754,        1725.,           0.,           0.
*Element, type=B31OS
1665, 1750, 1753
1666, 1753, 1751
1667, 1751, 1754
1668, 1754, 1752
*Nset, nset=beam_segment-1_Set-1, generate
1750, 1754,  1
*Elset, elset=beam_segment-1_Set-1, generate
1665, 1668,  1
*Nset, nset=beam_segment-1_Set-2, generate
1750, 1754,  1
*Elset, elset=beam_segment-1_Set-2, generate
1665, 1668,  1
*Nset, nset=beam_segment-1_beam_bot_node
1750,
*Nset, nset=beam_segment-1_beam_top_node
1752,
** Section: beam_section  Profile: C5_sec
*Beam Section, elset=beam_segment-1_Set-1, material=steel_chabouche-flange-orig, temperature=GRADIENTS, section=I
313.2, 626.4, 328., 328., 27.1, 27.1, 17.6
1.,0.,-6.12323e-17
** ----------------------------------------------------------------
**
** PART INSTANCE: shell_segment-1
**
*System
          0.,          0.,       3100.,          1.,          0.,       3100.
*Node
   1755,           0.,  -299.649994,           0.
   1756,           0.,  -299.649994,         800.
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*Element, type=S4R
1669, 1755, 1767, 2047, 1840
1670, 1767, 1768, 2048, 2047
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*Nset, nset=shell_segment-1__PickedSet2
 1755, 1756, 1757, 1758, 1759, 1760
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*Elset, elset=shell_segment-1__PickedSet2, generate
1669, 2564,    1
*Nset, nset=shell_segment-1__G3
 1755, 1756, 1761, 1762, 1767, 1768
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*Elset, elset=shell_segment-1__G3, generate
 2565,  3332,     1
*Nset, nset=shell_segment-1_shell_top_nodes
1756,1757,1760,1762,1763,1766
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*Elset, elset=shell_segment-1_shell_top_nodes
1700,1732,1764,1796,1828,1860
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*Nset, nset=shell_segment-1_shell_bot_nodes
1755,1758,1759,1761,1764,1765
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*Elset, elset=shell_segment-1_shell_bot_nodes
 1669, 1701, 1733, 1765, 1797, 1829
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** Section: flange_section
*Shell Section, elset=shell_segment-1__PickedSet2, material=steel_chabouche-flange-orig, controls=EC-1
27.1, 5
** Section: web_section
*Shell Section, elset=shell_segment-1__G3, material=steel_chabouche-web-orig, controls=EC-1
17.6, 5
*System
*Node
   3504,           0.,           0.,        3900.
*Node
   3505,           0.,           0.,           0.
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*Nset, nset=Set-17
3504,
*Nset, nset=Set-18
3504,
*Nset, nset=Set-19
3504,
*Nset, nset=Set-20
1751,
*Nset, nset=base_node
3505,
*Nset, nset=control_node
3504,
*Nset, nset=_PickedSet7
3504,
*Nset, nset=_PickedSet8
3505,
*Nset, nset=_PickedSet12
3505,
*Nset, nset=_PickedSet13
3504,
*Elset, elset=_s_Surf-1_SNEG, generate
    1,  1664,     1
*Surface, type=ELEMENT, name=s_Surf-1
_s_Surf-1_SNEG, SNEG
*Surface, type=NODE, name=top_segment_shell_top_nodes_CNS_
top_segment_shell_top_nodes, 1.
*Surface, type=NODE, name=shell_segment-1_shell_bot_nodes_CNS_
shell_segment-1_shell_bot_nodes, 1.
** Constraint: bot_couple
*Coupling, constraint name=bot_couple, ref node=beam_segment-1_beam_bot_node, surface=top_segment_shell_top_nodes_CNS_
*Kinematic
1, 1
2, 2
3, 3
** Constraint: rigid_base
*Rigid Body, ref node=_PickedSet8, tie nset=top_segment_shell_bot_nodes
** Constraint: top_couple
*Coupling, constraint name=top_couple, ref node=beam_segment-1_beam_top_node, surface=shell_segment-1_shell_bot_nodes_CNS_
*Kinematic
1, 1
2, 2
3, 3
** Constraint: top_plate
*Rigid Body, ref node=_PickedSet7, tie nset=shell_segment-1_shell_top_nodes
*Element, type=MASS, elset=Set-12_Inertia-1_
3333, 3504
*Mass, elset=Set-12_Inertia-1_, type=ANISOTROPIC, alpha=0.168
0., 1982., 0.
**
** ELEMENT CONTROLS
**
*Section Controls, name=EC-1, hourglass=ENHANCED
1., 1., 1.
*Amplitude, name=C5_protocol, definition=EQUALLY SPACED, fixed interval=1.
             0.,             1.5,            -1.5,             1.5,            -1.5,              5.,              1.,              4.
             1.,              5.,              1.,              4.,              1.,              4.,              1.,              4.
             1.,             8.2,             4.1,             7.1,             4.1,             8.2,             4.1,             7.2
            4.1,             7.2,             4.1,             7.2,             4.1,             10.,              0.,            -10.
             0.
*Amplitude, name=c5_rot_protocol
             0.,              0.,              1.,            -1.4,              2.,             1.4,              3.,            -1.4
             4.,             1.4,              5.,            -2.9,              6.,            0.61,              7.,             -2.
             8.,            0.61,              9.,            -2.9,             10.,            0.61,             11.,             -2.
            12.,            0.61,             13.,             -2.,             14.,            0.61,             15.,             -2.
            16.,            0.61,             17.,            -3.2,             18.,             0.4,             19.,            -2.4
            20.,             0.4,             21.,            -3.2,             22.,             0.4,             23.,            -2.4
            24.,             0.4,             25.,            -2.4,             26.,             0.4,             27.,            -2.4
            28.,             0.4,             29.,            -1.9,             30.,             2.2,             32.,              0.
**
** MATERIALS
**
*Material, name=UVC_flange
*Density
 8e-12,
*Depvar
     10,
*User Material, constants=11
200000.,    0.3, 373.72, 141.47,   15.2, 135.95, 211.16, 25621.
 235.12, 942.18,   3.16
*Material, name=UVC_web
*Density
 8e-12,
*Depvar
     10,
*User Material, constants=11
200000.,    0.3, 378.83, 122.63,  19.74, 143.49, 248.14, 31638.
 277.32, 1548.6,   9.04
*Material, name=steel_chabouche-flange
*Density
 8e-12,
*Elastic
198600., 0.3
*Plastic, hardening=COMBINED, datatype=PARAMETERS, number backstresses=2
 339.8, 11608.2,   145.2,  1026.3,     4.7
*Cyclic Hardening, parameters
 339.8, 100.7,    8.
*Material, name=steel_chabouche-flange-orig
*Density
 8e-12,
*Elastic
180000., 0.3
*Plastic, hardening=COMBINED, datatype=PARAMETERS, number backstresses=2
 318.5, 11608.2,   145.2,  1026.3,     4.7
*Cyclic Hardening, parameters
 318.5, 100.7,    8.
*Material, name=steel_chabouche-web
*Density
 8e-12,
*Elastic
185200., 0.3
*Plastic, hardening=COMBINED, datatype=PARAMETERS, number backstresses=2
 369.2, 8716.1,  118.5, 1182.1,    5.2
*Cyclic Hardening, parameters
 369.2, 77.5,  9.3
*Material, name=steel_chabouche-web-orig
*Density
 8e-12,
*Elastic
183000., 0.3
*Plastic, hardening=COMBINED, datatype=PARAMETERS, number backstresses=2
 339.2, 8716.1,  118.5, 1182.1,    5.2
*Cyclic Hardening, parameters
 339.2, 77.5,  9.3
**
** BOUNDARY CONDITIONS
**
** Name: bot_fix Type: Displacement/Rotation
*Boundary
_PickedSet12, 1, 1
_PickedSet12, 2, 2
_PickedSet12, 3, 3
_PickedSet12, 4, 4
_PickedSet12, 5, 5
_PickedSet12, 6, 6
** Name: top_fix Type: Displacement/Rotation
*Boundary
Set-17, 1, 1
Set-17, 5, 5
Set-17, 6, 6
*IMPERFECTION, input=C5-KC-TopRot-Imp.txt
** ----------------------------------------------------------------
**
** STEP: gravity_loading
**
*Step, name=gravity_loading, nlgeom=YES, inc=10000
*Static
0.1, 1., 1e-35, 0.1
**
** LOADS
**
** Name: gravity_load   Type: Concentrated force
*Cload
_PickedSet13, 3, -2.07e+06
** Name: mid_torque-half   Type: Moment
*Cload
Set-20, 6, 7.25e+06
**
** OUTPUT REQUESTS
**
*Restart, write, frequency=0
**
** FIELD OUTPUT: F-Output-1
**
*Output, field, variable=PRESELECT
**
** HISTORY OUTPUT: H-Output-1
**
*Output, history, variable=PRESELECT
*End Step
** ----------------------------------------------------------------
**
** STEP: lateral_loading
**
*Step, name=lateral_loading, nlgeom=YES, inc=100000000
*Static
0.125, 32., 1e-10, 0.125
**
** BOUNDARY CONDITIONS
**
** Name: disp_control Type: Displacement/Rotation
*Boundary, amplitude=C5_protocol
Set-19, 2, 2, 39.
** Name: rot_control Type: Displacement/Rotation
*Boundary, amplitude=c5_rot_protocol
Set-18, 4, 4, 0.01
**
** OUTPUT REQUESTS
**
*Restart, write, frequency=0
**
** FIELD OUTPUT: F-Output-1
**
*Output, field, variable=PRESELECT, time interval=0.125
**
** HISTORY OUTPUT: H-Output-1
**
*Output, history, variable=PRESELECT
*End Step
