*Heading
** Job name: DBBW-FlexTop-NoParts Model name: DBBW-FlexTop-NoParts
** Generated by: Abaqus/CAE 6.14-1
*Preprint, echo=NO, model=NO, history=NO, contact=NO
** ----------------------------------------------------------------
**
** PART INSTANCE: column-1
**
*Node
      1,           0.,  -196.300003,        3708.
      2,           0.,  -196.300003,           0.
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*Element, type=S4R
  1,   1,  13, 489, 164
  2,  13,  14, 490, 489
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*Nset, nset=column-1_Set-1
    1,    2,    3,    4,    5,    6
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*Elset, elset=column-1_Set-1
    1,    2,    3,    4,    5,    6
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*Nset, nset=column-1_Set-2
    1,    2,    7,    8,   13,   14
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*Elset, elset=column-1_Set-2, generate
  593,  1184,     1
*Nset, nset=column-1_all_nodes, generate
    1,  1875,     1
*Elset, elset=column-1_all_nodes, generate
    1,  1776,     1
** Section: col_flange
*Shell Section, elset=column-1_Set-1, material=steel_sac-avg
72.4, 5
** Section: col_web
*Shell Section, elset=column-1_Set-2, material=steel_sac-avg
45., 5
** ----------------------------------------------------------------
**
** PART INSTANCE: beam-1
**
*System
          0.,      -196.3,       1854.,          1.,      -196.3,       1854.
          0.,      -196.3,       1855.
*Node
   1876,       -152.5,  -444.049988,         950.
   1877,           0.,  -444.049988,         950.
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*Element, type=S4R
1777, 1876, 1914, 2571, 2021
1778, 1914, 1915, 2572, 2571
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*Element, type=S3
3697, 4191, 4183, 4173
3698, 4100, 2431, 2432
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*Nset, nset=beam-1_Set-1
 1876, 1877, 1878, 1879, 1880, 1881
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*Elset, elset=beam-1_Set-1
 1777, 1778, 1779, 1780, 1781, 1782
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*Nset, nset=beam-1_Set-2
 1877, 1878, 1880, 1881, 1883, 1884
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*Elset, elset=beam-1_Set-2
 1936, 1937, 1938, 1939, 1940, 1941
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*Nset, nset=beam-1_beam_col_interf
1884,1885,1890,1891,1903,1905
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*Elset, elset=beam-1_beam_col_interf
 2899, 2900, 2901, 3070, 3071, 3072
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*Nset, nset=beam-1_all_nodes, generate
 1876,  4977,     1
*Elset, elset=beam-1_all_nodes, generate
 1777,  4762,     1
** Section: beam_flange
*Shell Section, elset=beam-1_Set-1, material=steel_sac-avg
23.9, 5
** Section: beam_web
*Shell Section, elset=beam-1_Set-2, material=steel_sac-avg
15.9, 5
** ----------------------------------------------------------------
**
** PART INSTANCE: beam-2
**
*System
          0.,       196.3,       1854.,          1.,       196.3,       1854.
          0.,       196.3,       1853.
*Node
   4978,       -152.5,  -444.049988,         950.
   4979,           0.,  -444.049988,         950.
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*Element, type=S4R
4763, 4978, 5016, 5673, 5123
4764, 5016, 5017, 5674, 5673
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*Element, type=S3
6683, 7293, 7285, 7275
6684, 7202, 5533, 5534
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*Nset, nset=beam-2_Set-1
 4978, 4979, 4980, 4981, 4982, 4983
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*Elset, elset=beam-2_Set-1
 4763, 4764, 4765, 4766, 4767, 4768
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*Nset, nset=beam-2_Set-2
 4979, 4980, 4982, 4983, 4985, 4986
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*Elset, elset=beam-2_Set-2
 4922, 4923, 4924, 4925, 4926, 4927
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*Nset, nset=beam-2_beam_col_interf
4986,4987,4992,4993,5005,5007
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** Section: beam_flange
*Shell Section, elset=beam-2_Set-1, material=steel_sac-avg
23.9, 5
** Section: beam_web
*Shell Section, elset=beam-2_Set-2, material=steel_sac-avg
15.9, 5
*System
*Node
   8080,           0.,           0.,        3708.
*Node
   8081,           0.,           0.,           0.
*Node
   8082,           0.,           0.,        3709.
*Element, type=CONN3D2
7749, 8082, 8080
*Connector Section, elset=Wire-1-Set-1, behavior=ConnSect-1
Hinge,
"Datum csys-2",
*Nset, nset=Wire-1-Set-1
8080,8082
*Elset, elset=Wire-1-Set-1
 7749,
*Nset, nset=beam_corner_nodes
1893,1897,1900,1901
*Nset, nset=beam_corner_nodes
4995,4999,5002,5003
*Nset, nset=col_bot_rp
8081,
*Nset, nset=col_top_rp
8080,
*Nset, nset=roller_nodes
1878,1879,1899,1968,1969,2356,2357
*Nset, nset=roller_nodes
4983,4989,4997,5222,5223,5354,5355
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*Nset, nset=t_Set-3
   1,   4,   5,   7,   9,  12
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*Elset, elset=t_Set-3
    1,   75,  149,  223,  370,  444
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*Nset, nset=t_Set-4
   2,   3,   6,   8,  10,  11
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*Elset, elset=t_Set-4
   74,  148,  222,  296,  297,  371
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*Nset, nset=top_spring_node
8082,
*Elset, elset=_m_Surf-1_SPOS, generate
   1,  592,    1
*Surface, type=ELEMENT, name=m_Surf-1
_m_Surf-1_SPOS, SPOS
*Elset, elset=_m_Surf-2_SNEG, generate
 1185,  1776,     1
*Surface, type=ELEMENT, name=m_Surf-2
_m_Surf-2_SNEG, SNEG
*Surface, type=NODE, name=beam-1_beam_col_interf_CNS_
beam-1_beam_col_interf, 1.
*Surface, type=NODE, name=beam-2_beam_col_interf_CNS_
beam-2_beam_col_interf, 1.
*Orientation, name="Datum csys-2"
          0.,           0.,          -1.,           0.,           1.,           0.
1, 0.
** Constraint: Constraint-3
*Tie, name=Constraint-3, adjust=yes
beam-1_beam_col_interf_CNS_, m_Surf-1
** Constraint: Constraint-3-Copy
*Tie, name=Constraint-3-Copy, adjust=yes
beam-2_beam_col_interf_CNS_, m_Surf-2
** Constraint: col_bot_rigid
*Rigid Body, ref node=col_bot_rp, tie nset=t_Set-4
** Constraint: col_top_rigid
*Rigid Body, ref node=col_top_rp, tie nset=t_Set-3
*Connector Behavior, name=ConnSect-1
*Connector Elasticity, component=4
 1e+10,
*Amplitude, name=lateral_amp, definition=EQUALLY SPACED, fixed interval=1.
             0.,     0.002784348,       5.1271551,     0.150808944,      7.68108827,     12.75919762,     0.442028961,    -6.931781793
   -12.94652249,    -0.410360876,     8.742618913,     12.89386931,     0.094385003,     -6.76835197,    -12.69018989,    -1.092262865
   -1.092413614,     5.281159999,     12.75746801,      0.09116187,    -7.121188958,    -12.33929041,    -0.763583182,     8.224215073
    12.71614234,     0.337136359,     -7.12456919,    -12.69275008,    -1.162503771,     7.019675699,     12.58506183,     0.324143624
   -7.782298888,    -12.34323351,    -1.061486574,      7.28393641,     12.76386538,     0.324291706,     -6.06142425,    -12.39677048
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   -86.75416965,    -120.5487244,    -153.0185484,    -184.5635791,    -199.3600832,    -180.0384512,    -152.7753879,    -133.9500572
**
** MATERIALS
**
*Material, name=steel_flange
*Elastic
200000., 0.3
*Plastic, hardening=COMBINED, datatype=PARAMETERS, number backstresses=2
 318.47,  11608.,  145.22, 1026.33,    4.68
*Cyclic Hardening, parameters
 318.47, 100.72,     8.
*Material, name=steel_sac-avg
*Elastic
207300., 0.3
*Plastic, hardening=COMBINED, datatype=PARAMETERS, number backstresses=1
352., 2305.55,  20.153
*Cyclic Hardening, parameters
352., 61.6014, 8.95688
*Material, name=steel_sac-avg-lowfy
*Elastic
207300., 0.3
*Plastic, hardening=COMBINED, datatype=PARAMETERS, number backstresses=1
320., 2305.55,  20.153
*Cyclic Hardening, parameters
320., 61.6014, 8.95688
*Material, name=steel_web
*Elastic
200000., 0.3
*Plastic, hardening=COMBINED, datatype=PARAMETERS, number backstresses=2
 339.18, 8716.08,  118.47, 1182.05,    5.22
*Cyclic Hardening, parameters
 339.18, 77.52,  9.29
**
** BOUNDARY CONDITIONS
**
** Name: beam_lateral_hold Type: Displacement/Rotation
*Boundary
beam_corner_nodes, 1, 1
** Name: bot_fix Type: Displacement/Rotation
*Boundary
col_bot_rp, 1, 1
col_bot_rp, 2, 2
col_bot_rp, 3, 3
** Name: roller_supports Type: Displacement/Rotation
*Boundary
roller_nodes, 3, 3
** Name: top_fix Type: Displacement/Rotation
*Boundary
top_spring_node, 1, 1
top_spring_node, 6, 6
*Imperfection, file=DBBW-FlexTop-Buckle, step=1
3, 3.2
4, -3.2
** ----------------------------------------------------------------
**
** STEP: cyclic_loading
**
*Step, name=cyclic_loading, nlgeom=YES, inc=1000000000
*Static
1., 463., 1e-10, 1.
**
** BOUNDARY CONDITIONS
**
** Name: top_disp_control Type: Displacement/Rotation
*Boundary, amplitude=lateral_amp
top_spring_node, 2, 2, 1.
**
** OUTPUT REQUESTS
**
*Restart, write, frequency=0
**
** FIELD OUTPUT: F-Output-1
**
*Output, field, variable=PRESELECT, time interval=1.
**
** HISTORY OUTPUT: H-Output-1
**
*Output, history, variable=PRESELECT
*End Step
