*Heading
** Job name: DBBW-Macro-WIKC-LongShell Model name: DBBW-Macro-WIKC-LongShell
** Generated by: Abaqus/CAE 6.14-1
*Preprint, echo=NO, model=NO, history=NO, contact=NO
** ----------------------------------------------------------------
**
** PART INSTANCE: column-1
**
*System
          0.,          0.,       1004.,          1.,          0.,       1004.
*Node
      1,           0.,  -196.300003,        1700.
      2,           0.,  -196.300003,           0.
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*Element, type=S4R
  1,   1,  13, 249,  84
  2,  13,  14, 250, 249
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*Nset, nset=column-1_Set-1
   1,   2,   3,   4,   5,   6
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*Elset, elset=column-1_Set-1
   1,   2,   3,   4,   5,   6
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*Nset, nset=column-1_Set-2
   1,   2,   7,   8,  13,  14
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*Elset, elset=column-1_Set-2, generate
 273,  544,    1
*Nset, nset=column-1_top_interf
   1,   4,   5,   7,   9,  12
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*Elset, elset=column-1_top_interf
   1,  35,  69, 103, 170, 204
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*Nset, nset=column-1_bot_interf
   2,   3,   6,   8,  10,  11
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*Elset, elset=column-1_bot_interf
  34,  68, 102, 136, 137, 171
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*Nset, nset=column-1_all_nodes, generate
   1,  875,    1
*Elset, elset=column-1_all_nodes, generate
   1,  816,    1
** Section: col_flange
*Shell Section, elset=column-1_Set-1, material=steel_sac-avg
72.4, 5
** Section: col_web
*Shell Section, elset=column-1_Set-2, material=steel_sac-avg
45., 5
** ----------------------------------------------------------------
**
** PART INSTANCE: beam-1
**
*System
          0.,      -196.3,       1854.,          1.,      -196.3,       1854.
          0.,      -196.3,       1855.
*Node
    876,        152.5,  -444.049988,         200.
    877,           0.,  -444.049988,         200.
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*Element, type=S4R
817,  876,  908, 1228,  917
818,  908,  909, 1229, 1228
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*Nset, nset=beam-1_Set-1
  876,  877,  878,  879,  880,  881
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*Elset, elset=beam-1_Set-1
  817,  818,  819,  820,  821,  822
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*Nset, nset=beam-1_Set-2
  877,  878,  881,  882,  889,  890
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*Elset, elset=beam-1_Set-2
  853,  854,  855,  856,  857,  858
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*Nset, nset=beam-1_beam_col_interf
878,879,882,883,885,887
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*Elset, elset=beam-1_beam_col_interf
 826, 827, 828, 838, 839, 840
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*Nset, nset=beam-1_beam_couple_interf
 890, 891, 896, 905, 906, 907
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** Section: beam_flange
*Shell Section, elset=beam-1_Set-1, material=steel_sac-avg
23.9, 5
** Section: beam_web
*Shell Section, elset=beam-1_Set-2, material=steel_sac-avg
15.9, 5
** ----------------------------------------------------------------
**
** PART INSTANCE: beam-2
**
*System
          0.,       196.3,       1854.,          1.,       196.3,       1854.
          0.,       196.3,       1853.
*Node
   2178,        152.5,  -444.049988,         200.
   2179,           0.,  -444.049988,         200.
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*Element, type=S4R
2047, 2178, 2210, 2530, 2219
2048, 2210, 2211, 2531, 2530
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*Nset, nset=beam-2_Set-1
 2178, 2179, 2180, 2181, 2182, 2183
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*Elset, elset=beam-2_Set-1
 2047, 2048, 2049, 2050, 2051, 2052
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*Nset, nset=beam-2_Set-2
 2179, 2180, 2183, 2184, 2191, 2192
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*Elset, elset=beam-2_Set-2
 2083, 2084, 2085, 2086, 2087, 2088
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*Nset, nset=beam-2_beam_col_interf
2180,2181,2184,2185,2187,2189
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*Elset, elset=beam-2_beam_col_interf
2056,2057,2058,2068,2069,2070
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*Nset, nset=beam-2_beam_couple_interf
2192,2193,2198,2207,2208,2209
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** Section: beam_flange
*Shell Section, elset=beam-2_Set-1, material=steel_sac-avg
23.9, 5
** Section: beam_web
*Shell Section, elset=beam-2_Set-2, material=steel_sac-avg
15.9, 5
** ----------------------------------------------------------------
**
** PART INSTANCE: beam-beam_dom-1
**
*System
          0.,      1496.3,       1854., 3.74939945665464e-33,      1497.3,       1854.
 -6.12323399573677e-17,      1496.3,       1855.
*Node
   3480,           0.,           0.,           0.
   3481,   2417.09595,           0.,           0.
   3482,        2662.,           0.,           0.
   3483,   483.419189,           0.,           0.
   3484,   966.838379,           0.,           0.
   3485,   1450.25757,           0.,           0.
   3486,   1933.67676,           0.,           0.
*Element, type=B31OS
3277, 3480, 3483
3278, 3483, 3484
3279, 3484, 3485
3280, 3485, 3486
3281, 3486, 3481
3282, 3481, 3482
*Nset, nset=beam-beam_dom-1_Set-1, generate
3480, 3486,  1
*Elset, elset=beam-beam_dom-1_Set-1, generate
3277, 3282,  1
*Nset, nset=beam-beam_dom-1_Set-2, generate
3480, 3486,  1
*Elset, elset=beam-beam_dom-1_Set-2, generate
3277, 3282,  1
*Nset, nset=beam-beam_dom-1_roller_nodes
3481,
*Nset, nset=beam-beam_dom-1_beam_end_node
3482,
*Nset, nset=beam-beam_dom-1_interf_node
3480,
*Nset, nset=beam-beam_dom-1_all_nodes, generate
3480, 3486,  1
*Elset, elset=beam-beam_dom-1_all_nodes, generate
3277, 3282,  1
** Section: beam_dom_section  Profile: w36x150
*Beam Section, elset=beam-beam_dom-1_Set-1, material=steel_sac-avg, temperature=GRADIENTS, section=I
456., 912., 305., 305., 23.9, 23.9, 15.9
-1.,0.,-6.12323e-17
** ----------------------------------------------------------------
**
** PART INSTANCE: beam-beam_dom-2
**
*System
          0.,     -1496.3,       1854., 3.74939945665464e-33,     -1497.3,       1854.
 6.12323399573677e-17,     -1496.3,       1853.
*Node
   3487,           0.,           0.,           0.
   3488,   2417.09595,           0.,           0.
   3489,        2662.,           0.,           0.
   3490,   483.419189,           0.,           0.
   3491,   966.838379,           0.,           0.
   3492,   1450.25757,           0.,           0.
   3493,   1933.67676,           0.,           0.
*Element, type=B31OS
3283, 3487, 3490
3284, 3490, 3491
3285, 3491, 3492
3286, 3492, 3493
3287, 3493, 3488
3288, 3488, 3489
*Nset, nset=beam-beam_dom-2_Set-1, generate
3487, 3493,  1
*Elset, elset=beam-beam_dom-2_Set-1, generate
3283, 3288,  1
*Nset, nset=beam-beam_dom-2_Set-2, generate
3487, 3493,  1
*Elset, elset=beam-beam_dom-2_Set-2, generate
3283, 3288,  1
*Nset, nset=beam-beam_dom-2_roller_nodes
3488,
*Nset, nset=beam-beam_dom-2_beam_end_node
3489,
*Nset, nset=beam-beam_dom-2_interf_node
3487,
*Nset, nset=beam-beam_dom-2_all_nodes, generate
3487, 3493,  1
*Elset, elset=beam-beam_dom-2_all_nodes, generate
3283, 3288,  1
** Section: beam_dom_section  Profile: w36x150
*Beam Section, elset=beam-beam_dom-2_Set-1, material=steel_sac-avg, temperature=GRADIENTS, section=I
456., 912., 305., 305., 23.9, 23.9, 15.9
-1.,0.,-6.12323e-17
** ----------------------------------------------------------------
**
** PART INSTANCE: column-beam_dom-1
**
*System
          0.,          0.,          0., 6.12323399573677e-17,          0.,          1.
          0.,          1.,          0.
*Node
   3494,           0.,           0.,           0.
   3495,   334.666656,           0.,           0.
   3496,   669.333313,           0.,           0.
   3497,        1004.,           0.,           0.
*Element, type=B31OS
3289, 3494, 3495
3290, 3495, 3496
3291, 3496, 3497
*Nset, nset=column-beam_dom-1_Set-1, generate
3494, 3497,  1
*Elset, elset=column-beam_dom-1_Set-1, generate
3289, 3291,  1
*Nset, nset=column-beam_dom-1_Set-2, generate
3494, 3497,  1
*Elset, elset=column-beam_dom-1_Set-2, generate
3289, 3291,  1
*Nset, nset=column-beam_dom-1_top_node
3497,
*Nset, nset=column-beam_dom-1_bot_node
3494,
*Nset, nset=column-beam_dom-1_all_nodes, generate
3494, 3497,  1
*Elset, elset=column-beam_dom-1_all_nodes, generate
3289, 3291,  1
** Section: column_dom_section  Profile: w14x398
*Beam Section, elset=column-beam_dom-1_Set-1, material=steel_sac-avg, temperature=GRADIENTS, section=I
232.5, 465., 422., 422., 72.4, 72.4, 45.
1.,0.,-6.12323e-17
** ----------------------------------------------------------------
**
** PART INSTANCE: column-beam_dom-3
**
*System
          0.,          0.,       2704., 6.12323399573677e-17,          0.,       2705.
          0.,          1.,       2704.
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*Elset, elset=column-beam_dom-3_Set-1, generate
3292, 3294,  1
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*Nset, nset=column-beam_dom-3_bot_node
3498,
*Nset, nset=column-beam_dom-3_all_nodes, generate
3498, 3501,  1
*Elset, elset=column-beam_dom-3_all_nodes, generate
3292, 3294,  1
** Section: column_dom_section  Profile: w14x398
*Beam Section, elset=column-beam_dom-3_Set-1, material=steel_sac-avg, temperature=GRADIENTS, section=I
232.5, 465., 422., 422., 72.4, 72.4, 45.
1.,0.,-6.12323e-17
*System
*Node
   3502,  6.14772718e-14,           0.,        3709.
*Element, type=CONN3D2
3295, 3501, 3502
*Connector Section, elset=Wire-1-Set-1, behavior=ConnSect-1
Hinge,
"Datum csys-2",
*Nset, nset=Wire-1-Set-1
3502,
*Nset, nset=Wire-1-Set-1
3501,
*Elset, elset=Wire-1-Set-1
 3295,
*Nset, nset=all_beam_nodes, generate
3480, 3486,  1
*Nset, nset=all_beam_nodes, generate
3487, 3493,  1
*Nset, nset=all_beam_nodes
3502,
*Nset, nset=all_beam_nodes, generate
3494, 3497,  1
*Nset, nset=all_beam_nodes, generate
3498, 3501,  1
*Elset, elset=all_beam_nodes, generate
3277, 3282,  1
*Elset, elset=all_beam_nodes, generate
3283, 3288,  1
*Elset, elset=all_beam_nodes
 3295,
*Elset, elset=all_beam_nodes, generate
3289, 3291,  1
*Elset, elset=all_beam_nodes, generate
3292, 3294,  1
*Nset, nset=beam_corner_nodes
891,905,906,907
*Nset, nset=beam_corner_nodes
2193,2207,2208,2209
*Nset, nset=col_bot
3494,
*Nset, nset=col_top
3501,
*Nset, nset=hinge_node
3502,
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*Elset, elset=_m_Surf-1_SPOS, generate
   1,  272,    1
*Surface, type=ELEMENT, name=m_Surf-1
_m_Surf-1_SPOS, SPOS
*Elset, elset=_m_Surf-2_SNEG, generate
 545,  816,    1
*Surface, type=ELEMENT, name=m_Surf-2
_m_Surf-2_SNEG, SNEG
*Surface, type=NODE, name=beam-1_beam_col_interf_CNS_
beam-1_beam_col_interf, 1.
*Surface, type=NODE, name=beam-2_beam_col_interf_CNS_
beam-2_beam_col_interf, 1.
*Surface, type=NODE, name=beam-2_beam_couple_interf_CNS_
beam-2_beam_couple_interf, 1.
*Surface, type=NODE, name=beam-1_beam_couple_interf_CNS_
beam-1_beam_couple_interf, 1.
*Surface, type=NODE, name=column-1_bot_interf_CNS_
column-1_bot_interf, 1.
*Surface, type=NODE, name=column-1_top_interf_CNS_
column-1_top_interf, 1.
*Orientation, name="Datum csys-2"
          0.,           0.,           1.,           0.,           1.,           0.
1, 0.
** Constraint: Constraint-3
*Tie, name=Constraint-3, adjust=yes
beam-1_beam_col_interf_CNS_, m_Surf-1
** Constraint: Constraint-3-Copy
*Tie, name=Constraint-3-Copy, adjust=yes
beam-2_beam_col_interf_CNS_, m_Surf-2
** Constraint: beam_couple-1
*Coupling, constraint name=beam_couple-1, ref node=beam-beam_dom-1_interf_node, surface=beam-2_beam_couple_interf_CNS_
*Kinematic
1, 1
2, 2
3, 3
** Constraint: beam_couple-2
*Coupling, constraint name=beam_couple-2, ref node=beam-beam_dom-2_interf_node, surface=beam-1_beam_couple_interf_CNS_
*Kinematic
1, 1
2, 2
3, 3
** Constraint: col_couple-1
*Coupling, constraint name=col_couple-1, ref node=column-beam_dom-1_top_node, surface=column-1_bot_interf_CNS_
*Kinematic
1, 1
2, 2
3, 3
** Constraint: col_couple-2
*Coupling, constraint name=col_couple-2, ref node=column-beam_dom-3_bot_node, surface=column-1_top_interf_CNS_
*Kinematic
1, 1
2, 2
3, 3
*Connector Behavior, name=ConnSect-1
*Connector Elasticity, component=4
 1e+10,
*Amplitude, name=lateral_amp, time=TOTAL TIME, definition=EQUALLY SPACED, fixed interval=1.
             0.,     0.002784348,       5.1271551,     0.150808944,      7.68108827,     12.75919762,     0.442028961,    -6.931781793
   -12.94652249,    -0.410360876,     8.742618913,     12.89386931,     0.094385003,     -6.76835197,    -12.69018989,    -1.092262865
   -1.092413614,     5.281159999,     12.75746801,      0.09116187,    -7.121188958,    -12.33929041,    -0.763583182,     8.224215073
    12.71614234,     0.337136359,     -7.12456919,    -12.69275008,    -1.162503771,     7.019675699,     12.58506183,     0.324143624
   -7.782298888,    -12.34323351,    -1.061486574,      7.28393641,     12.76386538,     0.324291706,     -6.06142425,    -12.39677048
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   -86.75416965,    -120.5487244,    -153.0185484,    -184.5635791,    -199.3600832,    -180.0384512,    -152.7753879,    -133.9500572
**
** MATERIALS
**
*Material, name=elastic
*Elastic
200000., 0.3
*Material, name=steel_flange
*Elastic
200000., 0.3
*Plastic, hardening=COMBINED, datatype=PARAMETERS, number backstresses=2
 318.47,  11608.,  145.22, 1026.33,    4.68
*Cyclic Hardening, parameters
 318.47, 100.72,     8.
*Material, name=steel_sac-avg
*Elastic
207300., 0.3
*Plastic, hardening=COMBINED, datatype=PARAMETERS, number backstresses=1
352., 2305.55,  20.153
*Cyclic Hardening, parameters
352., 61.6014, 8.95688
*Material, name=steel_sac-avg-lowfy
*Elastic
207300., 0.3
*Plastic, hardening=COMBINED, datatype=PARAMETERS, number backstresses=1
320., 2305.55,  20.153
*Cyclic Hardening, parameters
320., 61.6014, 8.95688
*Material, name=steel_web
*Elastic
200000., 0.3
*Plastic, hardening=COMBINED, datatype=PARAMETERS, number backstresses=2
 339.18, 8716.08,  118.47, 1182.05,    5.22
*Cyclic Hardening, parameters
 339.18, 77.52,  9.29
**
** BOUNDARY CONDITIONS
**
** Name: beam_lateral_hold1 Type: Displacement/Rotation
*Boundary
beam-beam_dom-1_beam_end_node, 1, 1
** Name: beam_lateral_hold2 Type: Displacement/Rotation
*Boundary
beam-beam_dom-2_beam_end_node, 1, 1
** Name: bot_fix Type: Displacement/Rotation
*Boundary
column-beam_dom-1_bot_node, 1, 1
column-beam_dom-1_bot_node, 2, 2
column-beam_dom-1_bot_node, 3, 3
** Name: roller_support1 Type: Displacement/Rotation
*Boundary
beam-beam_dom-1_roller_nodes, 3, 3
** Name: roller_support2 Type: Displacement/Rotation
*Boundary
beam-beam_dom-2_roller_nodes, 3, 3
** Name: top_fix Type: Displacement/Rotation
*Boundary
hinge_node, 1, 1
hinge_node, 6, 6
*Boundary
col_bot, 7, 7
*Boundary
col_top, 7, 7
*Imperfection, input=DBBW-Macro-KC-LongShell-Imp.txt
** ----------------------------------------------------------------
**
** STEP: cyclic_loading
**
*Step, name=cyclic_loading, nlgeom=YES, inc=1000000000
*Static
1., 1., 1e-10, 1.
**
** BOUNDARY CONDITIONS
**
** Name: top_disp_control Type: Displacement/Rotation
*Boundary, amplitude=lateral_amp
hinge_node, 2, 2, 1.
**
** CONTROLS
**
*Controls, reset
*Controls, parameters=field, field=displacement
0.1, , , , , , ,
**
** OUTPUT REQUESTS
**
*Restart, write, frequency=0
**
** FIELD OUTPUT: F-Output-1
**
*Output, field, variable=PRESELECT, time interval=1.
**
** HISTORY OUTPUT: warp_out
**
*Output, history
*Node Output, nset=all_beam_nodes
WARP,
**
** HISTORY OUTPUT: H-Output-1
**
*Output, history, variable=PRESELECT
*End Step
** ----------------------------------------------------------------
**
** STEP: cyclic_resetTol
**
*Step, name=cyclic_resetTol, nlgeom=YES, inc=10000000
*Static
1., 462., 1e-10, 1.
**
** CONTROLS
**
*Controls, reset
**
** OUTPUT REQUESTS
**
*Restart, write, frequency=0
**
** FIELD OUTPUT: F-Output-1
**
*Output, field, variable=PRESELECT, time interval=1.
**
** HISTORY OUTPUT: warp_out
**
*Output, history
*Node Output, nset=all_beam_nodes
WARP,
**
** HISTORY OUTPUT: H-Output-1
**
*Output, history, variable=PRESELECT
*End Step
