*Heading
** Job name: NIST_A-WIKC Model name: NIST_A-WIKC
** Generated by: Abaqus/CAE 6.14-1
*Preprint, echo=NO, model=NO, history=NO, contact=NO
** ----------------------------------------------------------------
**
** PART INSTANCE: top_segment
**
*Node
      1,           0.,  -374.644989,           0.
      2,           0.,  -374.644989,   1828.67004
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*Element, type=S4R
  1,   1,  13, 535, 164
  2,  13,  14, 536, 535
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*Nset, nset=top_segment__PickedSet2
    1,    2,    3,    4,    5,    6
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*Elset, elset=top_segment__PickedSet2, generate
    1,  1460,     1
*Nset, nset=top_segment__G3
    1,    2,    7,    8,   13,   14
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*Elset, elset=top_segment__G3, generate
 1461,  3650,     1
*Nset, nset=top_segment_shell_top_nodes
   2,   3,   6,   8,   9,  12
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*Elset, elset=top_segment_shell_top_nodes
   73,  146,  219,  292,  365,  366
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*Nset, nset=top_segment_shell_bot_nodes
   1,   4,   5,   7,  10,  11
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*Elset, elset=top_segment_shell_bot_nodes
    1,   74,  147,  220,  293,  438
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** Section: flange_section
*Shell Section, elset=top_segment__PickedSet2, material=steel_chabouche-flange
29.21, 5
** Section: web_section
*Shell Section, elset=top_segment__G3, material=steel_chabouche-web
16.51, 5
** ----------------------------------------------------------------
**
** PART INSTANCE: beam_segment-1
**
*System
          0.,          0.,     1828.67, 6.12323399573677e-17,          0.,     1829.67
          0.,          1.,     1828.67
*Node
   3775,           0.,           0.,           0.
   3776,   914.335022,           0.,           0.
   3777,   1828.67004,           0.,           0.
   3778,   457.167511,           0.,           0.
   3779,   1371.50244,           0.,           0.
*Element, type=B31OS
3651, 3775, 3778
3652, 3778, 3776
3653, 3776, 3779
3654, 3779, 3777
*Nset, nset=beam_segment-1_Set-1, generate
3775, 3779,  1
*Elset, elset=beam_segment-1_Set-1, generate
3651, 3654,  1
*Nset, nset=beam_segment-1_Set-2, generate
3775, 3779,  1
*Elset, elset=beam_segment-1_Set-2, generate
3651, 3654,  1
** Section: beam_section  Profile: w30x148
*Beam Section, elset=beam_segment-1_Set-1, material=steel_chabouche-flange, temperature=GRADIENTS, section=I
339.25, 778.5, 267., 267., 29.2, 29.2, 16.5
1.,0.,-6.12323e-17
** ----------------------------------------------------------------
**
** PART INSTANCE: shell_segment-1
**
*System
          0.,          0.,     3657.34,          1.,          0.,     3657.34
*Node
   3780,           0.,  -374.644989,           0.
   3781,           0.,  -374.644989,   1828.67004
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*Element, type=S4R
3655, 3780, 3792, 4314, 3943
3656, 3792, 3793, 4315, 4314
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*Nset, nset=shell_segment-1__PickedSet2
 3780, 3781, 3782, 3783, 3784, 3785
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*Elset, elset=shell_segment-1__PickedSet2, generate
 3655,  5114,     1
*Nset, nset=shell_segment-1__G3
 3780, 3781, 3786, 3787, 3792, 3793
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*Elset, elset=shell_segment-1__G3, generate
 5115,  7304,     1
*Nset, nset=shell_segment-1_shell_top_nodes
3781,3782,3785,3787,3788,3791
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*Elset, elset=shell_segment-1_shell_top_nodes
 3727, 3800, 3873, 3946, 4019, 4020
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** Section: flange_section
*Shell Section, elset=shell_segment-1__PickedSet2, material=steel_chabouche-flange
29.21, 5
** Section: web_section
*Shell Section, elset=shell_segment-1__G3, material=steel_chabouche-web
16.51, 5
*System
*Node
   7554,           0.,           0.,        5486.
*Node
   7555,           0.,           0.,           0.
*Nset, nset=Set-10
7554,
*Nset, nset=Set-11
7554,
*Nset, nset=Set-12
3776,
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*Nset, nset=_PickedSet7
7554,
*Nset, nset=_PickedSet8
7555,
*Nset, nset=_PickedSet12
7555,
*Nset, nset=_PickedSet13
7554,
** Constraint: rigid_base
*Rigid Body, ref node=_PickedSet8, tie nset=top_segment_shell_bot_nodes
** Constraint: top_plate
*Rigid Body, ref node=_PickedSet7, tie nset=shell_segment-1_shell_top_nodes
*Amplitude, name=lateral_mm, definition=EQUALLY SPACED, fixed interval=1.
             0.,            1.72,            7.14,           10.76,           14.87,           15.99,           15.99,           13.64
           9.19,            4.99,            0.85,           -3.81,           -8.63,          -12.14,          -15.69,           -14.3
          -10.6,           -6.18,           -1.32,            3.77,            8.77,           13.17,           16.54,           12.57
           9.01,            5.13,            0.26,           -4.48,           -9.03,          -13.13,          -15.55,          -13.13
          -9.28,           -5.04,           -0.64,            3.48,            8.45,           12.91,            16.6,           14.52
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        -177.68,         -173.45,         -171.64,         -168.62
*Amplitude, name=lateral_pattern
             0.,              0.,          0.0078,          0.0037,          0.0156,              0.,          0.0234,         -0.0037
         0.0313,              0.,          0.0391,          0.0037,          0.0469,              0.,          0.0547,         -0.0037
         0.0625,              0.,          0.0703,           0.005,          0.0781,              0.,          0.0859,          -0.005
         0.0938,              0.,          0.1016,           0.005,          0.1094,              0.,          0.1172,          -0.005
          0.125,              0.,          0.1328,          0.0075,          0.1406,              0.,          0.1484,         -0.0075
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             1.,              0.
**
** MATERIALS
**
*Material, name=steel_chabouche-flange
*Elastic
185000., 0.3
*Plastic, hardening=COMBINED, datatype=PARAMETERS, number backstresses=2
 358.9, 11608.2,   145.2,  1026.3,     4.7
*Cyclic Hardening, parameters
 358.9, 100.7,    8.
*Material, name=steel_chabouche-flange_auglag
*Elastic
185000., 0.3
*Plastic, hardening=COMBINED, datatype=PARAMETERS, number backstresses=2
 349.5, 3132.5, 21.431, 258.14, 1.3117
*Cyclic Hardening, parameters
 349.5, 114.47, 22.617
*Material, name=steel_chabouche-web
*Elastic
185000., 0.3
*Plastic, hardening=COMBINED, datatype=PARAMETERS, number backstresses=2
 438.1, 8716.1,  118.5, 1182.1,    5.2
*Cyclic Hardening, parameters
 438.1, 77.5,  9.3
**
** BOUNDARY CONDITIONS
**
** Name: bot_fix Type: Displacement/Rotation
*Boundary
_PickedSet12, 1, 1
_PickedSet12, 2, 2
_PickedSet12, 3, 3
_PickedSet12, 4, 4
_PickedSet12, 5, 5
_PickedSet12, 6, 6
** Name: top_fix Type: Displacement/Rotation
*Boundary
Set-10, 1, 1
Set-10, 4, 4
Set-10, 5, 5
Set-10, 6, 6
*IMPERFECTION, input=NIST_A-KC-Imp.txt
** ----------------------------------------------------------------
**
** STEP: gravity_loading
**
*Step, name=gravity_loading, nlgeom=YES, inc=10000
*Static
0.1, 1., 1e-35, 0.1
**
** LOADS
**
** Name: gravity_load   Type: Concentrated force
*Cload
_PickedSet13, 3, -1.744e+06
** Name: mid_torque   Type: Moment
*Cload
Set-12, 6, -1e+07
**
** OUTPUT REQUESTS
**
*Restart, write, frequency=0
**
** FIELD OUTPUT: F-Output-1
**
*Output, field, variable=PRESELECT, time interval=1.
**
** HISTORY OUTPUT: H-Output-1
**
*Output, history, variable=PRESELECT
*End Step
** ----------------------------------------------------------------
**
** STEP: lateral_loading
**
*Step, name=lateral_loading, nlgeom=YES, inc=10000
*Static
1., 1340., 1e-35, 1.
**
** BOUNDARY CONDITIONS
**
** Name: disp_control Type: Displacement/Rotation
*Boundary, amplitude=lateral_mm
Set-11, 2, 2, 1.
**
** OUTPUT REQUESTS
**
*Restart, write, frequency=0
**
** FIELD OUTPUT: F-Output-1
**
*Output, field, variable=PRESELECT, time interval=1.
**
** HISTORY OUTPUT: H-Output-1
**
*Output, history, variable=PRESELECT
*End Step
