*Heading
** Job name: Center_Tor_Macro-EQN-NL Model name: Center_Tor_Macro-EQN-NL
** Generated by: Abaqus/CAE 6.14-1
*Preprint, echo=NO, model=NO, history=NO, contact=NO
** ----------------------------------------------------------------
**
** PART INSTANCE: shell-1
**
*Node
      1,           0.,  -70.0999985,        482.5
      2,           0.,  -70.0999985,           0.
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*Element, type=S4R
  1,   1,  13, 207,  70
  2,  13,  14, 208, 207
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*Nset, nset=shell-1_Set-1
   1,   2,   3,   4,   5,   6
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*Elset, elset=shell-1_Set-1, generate
   1,  432,    1
*Nset, nset=shell-1_Set-2
   1,   2,   7,   8,  13,  14
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*Elset, elset=shell-1_Set-2, generate
 433,  648,    1
*Nset, nset=shell-1_shell_top_web, generate
 193,  199,    1
*Nset, nset=shell-1_shell_bot_web, generate
 200,  206,    1
** Section: flange
*Shell Section, elset=shell-1_Set-1, material=beam_mat
12.2, 5
** Section: web
*Shell Section, elset=shell-1_Set-2, material=beam_mat
8., 5
** ----------------------------------------------------------------
**
** PART INSTANCE: shell-2
**
*System
          0.,          0.,      1447.5,          1.,          0.,      1447.5
*Node
    701,           0.,  -70.0999985,        482.5
    702,           0.,  -70.0999985,           0.
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*Element, type=S4R
649, 701, 713, 907, 770
650, 713, 714, 908, 907
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*Nset, nset=shell-2_Set-1
 701, 702, 703, 704, 705, 706
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*Elset, elset=shell-2_Set-1, generate
 649, 1080,    1
*Nset, nset=shell-2_Set-2
 701, 702, 707, 708, 713, 714
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*Elset, elset=shell-2_Set-2, generate
1081, 1296,    1
*Nset, nset=shell-2_shell_top_web, generate
 893,  899,    1
*Nset, nset=shell-2_shell_bot_web, generate
 900,  906,    1
** Section: flange
*Shell Section, elset=shell-2_Set-1, material=beam_mat
12.2, 5
** Section: web
*Shell Section, elset=shell-2_Set-2, material=beam_mat
8., 5
** ----------------------------------------------------------------
**
** PART INSTANCE: beam-1
**
*System
          0.,          0.,       482.5, 6.12323399573677e-17,          1.,       482.5
 -6.12323399573677e-17, 3.74939945665464e-33,       483.5
*Node
   1401,           0.,           0.,           0.
   1402,           0.,        482.5,           0.
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*Element, type=B32OS
1297, 1401, 1412, 1404
1298, 1404, 1413, 1405
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*Nset, nset=beam-1_Set-1, generate
1401, 1421,   1
*Elset, elset=beam-1_Set-1, generate
1297, 1306,  1
*Nset, nset=beam-1_Set-2, generate
1401, 1421,   1
*Elset, elset=beam-1_Set-2, generate
1297, 1306,  1
*Nset, nset=beam-1_beam_bot_node
1401,
*Nset, nset=beam-1_beam_top_node
1403,
** Section: beam  Profile: Iprof
*Beam Section, elset=beam-1_Set-1, material=beam_mat, temperature=GRADIENTS, section=I
76.2, 152.4, 150.9, 150.9, 12.2, 12.2, 8.
-1.,6.12323e-17,-6.12323e-17
*System
*Node
   1422,           0.,           0.,        1930.
*Node
   1423,           0.,           0.,           0.
*Nset, nset=Set-5
1402,
*Nset, nset=Set-6
1422,
*Nset, nset=Set-7
1423,
*Nset, nset=bot_couple_shell_nodes
   1,   4,   5,   7,  10,  11
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*Nset, nset=m_Set-1
1422,
*Nset, nset=m_Set-2
1422,
*Nset, nset=m_Set-3
1423,
*Nset, nset=m_Set-4
1423,
*Nset, nset=top_couple_shell_nodes
 702, 703, 706, 708, 709, 712
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*Elset, elset=_s_Surf-1_E2
 675, 702, 729, 756, 891, 918, 945, 972
*Elset, elset=_s_Surf-1_E4
 757, 784, 811, 838, 973,1000,1027,1054
*Elset, elset=_s_Surf-1_E3, generate
1289, 1296,    1
*Surface, type=ELEMENT, name=s_Surf-1
_s_Surf-1_E2, E2
_s_Surf-1_E4, E4
_s_Surf-1_E3, E3
*Elset, elset=_s_Surf-2_E4
   1,  28,  55,  82, 217, 244, 271, 298
*Elset, elset=_s_Surf-2_E2
 135, 162, 189, 216, 351, 378, 405, 432
*Elset, elset=_s_Surf-2_E1, generate
 433,  440,    1
*Surface, type=ELEMENT, name=s_Surf-2
_s_Surf-2_E4, E4
_s_Surf-2_E2, E2
_s_Surf-2_E1, E1
*Elset, elset=_s_Surf-3_E4
 649, 676, 703, 730, 865, 892, 919, 946
*Elset, elset=_s_Surf-3_E2
 783, 810, 837, 864, 999,1026,1053,1080
*Surface, type=ELEMENT, name=s_Surf-3
_s_Surf-3_E4, E4
_s_Surf-3_E2, E2
*Elset, elset=_s_Surf-4_E2
  27,  54,  81, 108, 243, 270, 297, 324
*Elset, elset=_s_Surf-4_E4
 109, 136, 163, 190, 325, 352, 379, 406
*Surface, type=ELEMENT, name=s_Surf-4
_s_Surf-4_E2, E2
_s_Surf-4_E4, E4
*Elset, elset=_s_Surf-5_E4
   1,  28,  55,  82, 217, 244, 271, 298
*Elset, elset=_s_Surf-5_E2
 135, 162, 189, 216, 351, 378, 405, 432
*Surface, type=ELEMENT, name=s_Surf-5
_s_Surf-5_E4, E4
_s_Surf-5_E2, E2
*Elset, elset=_s_Surf-6_E2
 675, 702, 729, 756, 891, 918, 945, 972
*Elset, elset=_s_Surf-6_E4
 757, 784, 811, 838, 973,1000,1027,1054
*Surface, type=ELEMENT, name=s_Surf-6
_s_Surf-6_E2, E2
_s_Surf-6_E4, E4
*Surface, type=NODE, name=shell-1_shell_bot_web_CNS_
shell-1_shell_bot_web, 1.
*Surface, type=NODE, name=shell-2_shell_top_web_CNS_
shell-2_shell_top_web, 1.
** Constraint: bot_flange
*Coupling, constraint name=bot_flange, ref node=m_Set-4, surface=s_Surf-4
*Kinematic
1, 1
2, 2
4, 4
6, 6
** Constraint: bot_web
*Coupling, constraint name=bot_web, ref node=m_Set-3, surface=shell-1_shell_bot_web_CNS_
*Kinematic
** Constraint: top_flange
*Coupling, constraint name=top_flange, ref node=m_Set-2, surface=s_Surf-3
*Kinematic
1, 1
2, 2
4, 4
6, 6
** Constraint: top_web
*Coupling, constraint name=top_web, ref node=m_Set-1, surface=shell-2_shell_top_web_CNS_
*Kinematic
**
** MATERIALS
**
*Material, name=beam_mat
*Elastic
213400., 0.3
*Plastic
  285.,      0.
  289., 0.01329
 876.2,   0.094
**
** BOUNDARY CONDITIONS
**
** Name: bot_bc Type: Displacement/Rotation
*Boundary
Set-7, 1, 1
Set-7, 2, 2
Set-7, 3, 3
Set-7, 6, 6
** Name: top_bc Type: Displacement/Rotation
*Boundary
Set-6, 1, 1
Set-6, 2, 2
Set-6, 3, 3
Set-6, 6, 6
** ----------------------------------------------------------------
**
** STEP: loading
**
*Step, name=loading, nlgeom=YES, inc=1000
*Static
0.05, 1., 1e-25, 0.05
**
** LOADS
**
** Name: torsion   Type: Moment
*Cload
Set-5, 6, 2.5e+07
**
** OUTPUT REQUESTS
**
*Restart, write, frequency=0
**
** FIELD OUTPUT: F-Output-1
**
*Output, field, variable=PRESELECT, time interval=0.05
**
** HISTORY OUTPUT: H-Output-1
**
*Output, history
*Node Output, nset=beam-1_beam_bot_node
WARP,
*End Step
