*Heading
** Job name: SubAssem-W27X235-FS-Imp Model name: SubAssem-W27X235-FS-Imp
** Generated by: Abaqus/CAE 6.14-1
*Preprint, echo=NO, model=NO, history=NO, contact=NO
** ----------------------------------------------------------------
**
** PART INSTANCE: column-1
**
*Node
      1,        180.5,  -344.049988,    4955.8999
      2,           0.,  -344.049988,    4955.8999
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*Element, type=S4R
   1,    1,   31, 1822,  436
   2,   31,   32, 1823, 1822
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*Element, type=S3
14017, 14375, 14372, 14371
14018, 14369,  1811,  1812
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*Nset, nset=column-1_Set-1
     1,     2,     3,     4,     5,     6
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*Elset, elset=column-1_Set-1
     1,     2,     3,     4,     5,     6
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*Nset, nset=column-1_Set-2
     2,     3,     5,     6,     7,     9
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*Elset, elset=column-1_Set-2
  1387,  1388,  1389,  1390,  1391,  1392
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*Nset, nset=column-1_all_nodes, generate
     1,  14416,      1
*Elset, elset=column-1_all_nodes, generate
     1,  14104,      1
*Nset, nset=column-1_top_cont_nodes
   8,   9,  11,  14,  15,  17
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*Elset, elset=column-1_top_cont_nodes
  1499,  1500,  1501,  1502,  1571,  1572
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*Nset, nset=column-1_bot_cont_nodes
   6,   7,  10,  16,  18,  19
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*Elset, elset=column-1_bot_cont_nodes
  1471,  1472,  1473,  1474,  1475,  1476
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** Region: (col_flange:Set-1), (Controls:EC-1)
*Elset, elset=column-1__I1
     1,     2,     3,     4,     5,     6
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** Section: col_flange
*Shell Section, elset=column-1__I1, material=steel_sac-avg, controls=EC-1
40.9, 5
** Section: col_web
*Shell Section, elset=column-1_Set-2, material=steel_sac-avg, controls=EC-1
23.1, 5
** Region: (col_flange:Set-1), (Controls:Default)
*Elset, elset=column-1__I3
 14017, 14018, 14019, 14039, 14061, 14062, 14063, 14083, 14084, 14085
** Section: col_flange
*Shell Section, elset=column-1__I3, material=steel_sac-avg
40.9, 5
** ----------------------------------------------------------------
**
** PART INSTANCE: beam-1
**
*System
          0.,     -344.05,       5500.,          1.,     -344.05,       5500.
          0.,     -344.05,       5501.
*Node
  14417,       -152.5,  -444.049988,         950.
  14418,           0.,  -444.049988,         950.
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*Element, type=S4R
14105, 14417, 14455, 15112, 14562
14106, 14455, 14456, 15113, 15112
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*Element, type=S3
16025, 16732, 16724, 16714
16026, 16641, 14972, 14973
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*Nset, nset=beam-1_Set-1
14417,14418,14419,14420,14421,14422
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*Elset, elset=beam-1_Set-1
14105,14106,14107,14108,14109,14110
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*Nset, nset=beam-1_Set-2
14418,14419,14421,14422,14424,14425
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*Elset, elset=beam-1_Set-2
14264,14265,14266,14267,14268,14269
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*Nset, nset=beam-1_beam_col_interf
14425,14426,14431,14432,14444,14446
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** Section: beam_flange
*Shell Section, elset=beam-1_Set-1, material=steel_sac-avg
23.9, 5
** Section: beam_web
*Shell Section, elset=beam-1_Set-2, material=steel_sac-avg
15.9, 5
** ----------------------------------------------------------------
**
** PART INSTANCE: beam-2
**
*System
          0.,      344.05,       5500.,          1.,      344.05,       5500.
          0.,      344.05,       5499.
*Node
  17519,       -152.5,  -444.049988,         950.
  17520,           0.,  -444.049988,         950.
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*Element, type=S4R
17091, 17519, 17557, 18214, 17664
17092, 17557, 17558, 18215, 18214
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*Element, type=S3
19011, 19834, 19826, 19816
19012, 19743, 18074, 18075
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*Nset, nset=beam-2_Set-1
17519,17520,17521,17522,17523,17524
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*Elset, elset=beam-2_Set-1
17091,17092,17093,17094,17095,17096
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*Nset, nset=beam-2_Set-2
17520,17521,17523,17524,17526,17527
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*Elset, elset=beam-2_Set-2
17250,17251,17252,17253,17254,17255
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*Nset, nset=beam-2_beam_col_interf
17527,17528,17533,17534,17546,17548
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** Section: beam_flange
*Shell Section, elset=beam-2_Set-1, material=steel_sac-avg
23.9, 5
** Section: beam_web
*Shell Section, elset=beam-2_Set-2, material=steel_sac-avg
15.9, 5
** ----------------------------------------------------------------
**
** PART INSTANCE: cont_plate-1
**
*System
          0.,     -344.05,     5055.95,          1.,     -344.05,     5055.95
          0.,     -344.05,     5054.95
*Node
  20621,         150.,           0.,   688.099976
  20622,         125.,           0.,   688.099976
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*Elset, elset=cont_plate-1_Set-1, generate
20077, 20244,    1
*Nset, nset=cont_plate-1_out_edges
20621,20622,20623,20624,20625,20626
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*Elset, elset=cont_plate-1_out_edges
20077,20078,20079,20080,20081,20082
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** Section: cont_plate
*Shell Section, elset=cont_plate-1_Set-1, material=steel_sac-avg
19.05, 5
** ----------------------------------------------------------------
**
** PART INSTANCE: cont_plate-1-lin-1-2
**
*System
          0.,     -344.05,      5944.1,          1.,     -344.05,      5944.1
          0.,     -344.05,      5943.1
*Node
  20824,         150.,           0.,   688.099976
  20825,         125.,           0.,   688.099976
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*Elset, elset=cont_plate-1-lin-1-2_Set-1, generate
20245, 20412,    1
*Nset, nset=cont_plate-1-lin-1-2_out_edges
20824,20825,20826,20827,20828,20829
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*Elset, elset=cont_plate-1-lin-1-2_out_edges
20245,20246,20247,20248,20249,20250
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** Section: cont_plate
*Shell Section, elset=cont_plate-1-lin-1-2_Set-1, material=steel_sac-avg
19.05, 5
** ----------------------------------------------------------------
**
** PART INSTANCE: cont_plate-1-lin-2-1
**
*System
       -150.,     -344.05,     5055.95,       -149.,     -344.05,     5055.95
       -150.,     -344.05,     5054.95
*Node
  21027,         150.,           0.,   688.099976
  21028,         125.,           0.,   688.099976
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*Elset, elset=cont_plate-1-lin-2-1_Set-1, generate
20413, 20580,    1
*Nset, nset=cont_plate-1-lin-2-1_out_edges
21027,21028,21029,21030,21031,21032
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*Elset, elset=cont_plate-1-lin-2-1_out_edges
20413,20414,20415,20416,20417,20418
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** Section: cont_plate
*Shell Section, elset=cont_plate-1-lin-2-1_Set-1, material=steel_sac-avg
19.05, 5
** ----------------------------------------------------------------
**
** PART INSTANCE: cont_plate-1-lin-2-2
**
*System
       -150.,     -344.05,      5944.1,       -149.,     -344.05,      5944.1
       -150.,     -344.05,      5943.1
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*Elset, elset=cont_plate-1-lin-2-2_Set-1, generate
20581, 20748,    1
*Nset, nset=cont_plate-1-lin-2-2_out_edges
21230,21231,21232,21233,21234,21235
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*Elset, elset=cont_plate-1-lin-2-2_out_edges
20581,20582,20583,20584,20585,20586
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** Section: cont_plate
*Shell Section, elset=cont_plate-1-lin-2-2_Set-1, material=steel_sac-avg
19.05, 5
*System
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*Connector Section, elset=Wire-1-Set-1, behavior=ConnSect-1
Hinge,
"Datum csys-2",
*Nset, nset=Wire-1-Set-1
21433,21435
*Elset, elset=Wire-1-Set-1
 20749,
*Nset, nset=beam_corner_nodes
14434,14438,14441,14442
*Nset, nset=beam_corner_nodes
17536,17540,17543,17544
*Nset, nset=col_bot_rp
21434,
*Nset, nset=col_top_rp
21433,
*Nset, nset=pz_corners
  8, 10, 11, 14, 16, 17, 18, 19
*Nset, nset=roller_nodes
14419,14420,14440,14509,14510,14897,14898
*Nset, nset=roller_nodes
17524,17530,17538,17763,17764,17895,17896
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*Nset, nset=t_Set-3
   12,   13,   23,   24,   25,   30
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*Elset, elset=t_Set-3
  1751,  1752,  1753,  1754,  9585,  9586
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*Nset, nset=t_Set-4
    3,    4,   21,   22,   27,   29
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*Elset, elset=t_Set-4
  1380,  1381,  1382,  1383,  1384,  1385
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*Nset, nset=top_spring_node
21435,
*Elset, elset=_col_surfaces_SPOS, generate
     1,  14104,      1
*Surface, type=ELEMENT, name=col_surfaces
_col_surfaces_SPOS, SPOS
*Elset, elset=_m_Surf-1_SPOS
     1,     2,     3,     4,     5,     6
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*Surface, type=ELEMENT, name=m_Surf-1
_m_Surf-1_SPOS, SPOS
*Elset, elset=_m_Surf-2_SNEG
  1499,  1500,  1501,  1502,  1503,  1504
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*Surface, type=ELEMENT, name=m_Surf-2
_m_Surf-2_SNEG, SNEG
*Surface, type=NODE, name=beam-1_beam_col_interf_CNS_
beam-1_beam_col_interf, 1.
*Surface, type=NODE, name=beam-2_beam_col_interf_CNS_
beam-2_beam_col_interf, 1.
*Surface, type=NODE, name=cont_plate-1_out_edges_CNS_
cont_plate-1_out_edges, 1.
*Surface, type=NODE, name=cont_plate-1-lin-1-2_out_edges_CNS_
cont_plate-1-lin-1-2_out_edges, 1.
*Surface, type=NODE, name=cont_plate-1-lin-2-1_out_edges_CNS_
cont_plate-1-lin-2-1_out_edges, 1.
*Surface, type=NODE, name=cont_plate-1-lin-2-2_out_edges_CNS_
cont_plate-1-lin-2-2_out_edges, 1.
*Orientation, name="Datum csys-2"
          0.,           0.,          -1.,           0.,           1.,           0.
1, 0.
** Constraint: Constraint-3
*Tie, name=Constraint-3, adjust=yes
beam-1_beam_col_interf_CNS_, m_Surf-1
** Constraint: Constraint-3-Copy
*Tie, name=Constraint-3-Copy, adjust=yes
beam-2_beam_col_interf_CNS_, m_Surf-2
** Constraint: col_bot_rigid
*Rigid Body, ref node=col_bot_rp, tie nset=t_Set-4
** Constraint: col_top_rigid
*Rigid Body, ref node=col_top_rp, tie nset=t_Set-3
** Constraint: cont_pl_1
*Tie, name=cont_pl_1, adjust=yes
cont_plate-1_out_edges_CNS_, col_surfaces
** Constraint: cont_pl_2
*Tie, name=cont_pl_2, adjust=yes
cont_plate-1-lin-1-2_out_edges_CNS_, col_surfaces
** Constraint: cont_pl_3
*Tie, name=cont_pl_3, adjust=yes
cont_plate-1-lin-2-1_out_edges_CNS_, col_surfaces
** Constraint: cont_pl_4
*Tie, name=cont_pl_4, adjust=yes
cont_plate-1-lin-2-2_out_edges_CNS_, col_surfaces
*Connector Behavior, name=ConnSect-1
*Connector Elasticity, component=4
 1e+10,
**
** ELEMENT CONTROLS
**
*Section Controls, name=EC-1, hourglass=ENHANCED
1., 1., 1.
*Amplitude, name=lateral_amp, definition=EQUALLY SPACED, fixed interval=1.
             0.,     0.002784348,       5.1271551,     0.150808944,      7.68108827,     12.75919762,     0.442028961,    -6.931781793
   -12.94652249,    -0.410360876,     8.742618913,     12.89386931,     0.094385003,     -6.76835197,    -12.69018989,    -1.092262865
   -1.092413614,     5.281159999,     12.75746801,      0.09116187,    -7.121188958,    -12.33929041,    -0.763583182,     8.224215073
    12.71614234,     0.337136359,     -7.12456919,    -12.69275008,    -1.162503771,     7.019675699,     12.58506183,     0.324143624
   -7.782298888,    -12.34323351,    -1.061486574,      7.28393641,     12.76386538,     0.324291706,     -6.06142425,    -12.39677048
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   -86.75416965,    -120.5487244,    -153.0185484,    -184.5635791,    -199.3600832,    -180.0384512,    -152.7753879,    -133.9500572
**
** MATERIALS
**
*Material, name=steel_flange
*Elastic
200000., 0.3
*Plastic, hardening=COMBINED, datatype=PARAMETERS, number backstresses=2
 318.47,  11608.,  145.22, 1026.33,    4.68
*Cyclic Hardening, parameters
 318.47, 100.72,     8.
*Material, name=steel_sac-avg
*Elastic
207300., 0.3
*Plastic, hardening=COMBINED, datatype=PARAMETERS, number backstresses=1
352., 2305.55,  20.153
*Cyclic Hardening, parameters
352., 61.6014, 8.95688
*Material, name=steel_sac-avg-lowfy
*Elastic
207300., 0.3
*Plastic, hardening=COMBINED, datatype=PARAMETERS, number backstresses=1
320., 2305.55,  20.153
*Cyclic Hardening, parameters
320., 61.6014, 8.95688
*Material, name=steel_web
*Elastic
200000., 0.3
*Plastic, hardening=COMBINED, datatype=PARAMETERS, number backstresses=2
 339.18, 8716.08,  118.47, 1182.05,    5.22
*Cyclic Hardening, parameters
 339.18, 77.52,  9.29
**
** BOUNDARY CONDITIONS
**
** Name: beam_lateral_hold Type: Displacement/Rotation
*Boundary
beam_corner_nodes, 1, 1
** Name: bot_fix Type: Displacement/Rotation
*Boundary
col_bot_rp, 1, 1
col_bot_rp, 2, 2
col_bot_rp, 3, 3
col_bot_rp, 4, 4
col_bot_rp, 5, 5
col_bot_rp, 6, 6
** Name: pz_lat_fix Type: Displacement/Rotation
*Boundary
pz_corners, 1, 1
** Name: roller_supports Type: Displacement/Rotation
*Boundary
roller_nodes, 3, 3
** Name: top_fix Type: Displacement/Rotation
*Boundary
top_spring_node, 6, 6
** ----------------------------------------------------------------
**
** STEP: gravity
**
*Step, name=gravity, nlgeom=YES, inc=1000000
*Static
0.1, 1., 1e-05, 0.1
**
** LOADS
**
** Name: grav_load   Type: Concentrated force
*Cload
col_top_rp, 3, -3.4003e+06
**
** OUTPUT REQUESTS
**
*Restart, write, frequency=0
**
** FIELD OUTPUT: F-Output-1
**
*Output, field, variable=PRESELECT, time interval=1.
**
** HISTORY OUTPUT: H-Output-1
**
*Output, history, variable=PRESELECT
*End Step
** ----------------------------------------------------------------
**
** STEP: cyclic_loading
**
*Step, name=cyclic_loading, nlgeom=YES, inc=1000000000
*Static
1., 463., 1e-10, 1.
**
** BOUNDARY CONDITIONS
**
** Name: top_disp_control Type: Displacement/Rotation
*Boundary, amplitude=lateral_amp
top_spring_node, 2, 2, 2.2247
**
** OUTPUT REQUESTS
**
*Restart, write, frequency=0
**
** FIELD OUTPUT: F-Output-1
**
*Output, field, variable=PRESELECT, time interval=1.
**
** HISTORY OUTPUT: H-Output-1
**
*Output, history, variable=PRESELECT
*End Step
