*Heading
** Job name: WIKC-V2-neg-y-orient Model name: WIKC-V2-neg-y-orient
** Generated by: Abaqus/CAE 6.14-1
*Preprint, echo=NO, model=NO, history=NO, contact=NO
** ----------------------------------------------------------------
**
** PART INSTANCE: Part-1-1
**
*System
          0.,      -1000.,          0., 6.12323399573677e-17,      -1001., 6.12323399573677e-17
          0.,      -1000.,          1.
*Node
      1,           0.,           0.,           0.
      2,         250.,           0.,           0.
      3,         500.,           0.,           0.
      4,         750.,           0.,           0.
      5,        1000.,           0.,           0.
*Element, type=B31OS
1, 1, 2
2, 2, 3
3, 3, 4
4, 4, 5
*Nset, nset=Part-1-1_Set-3, generate
 1,  5,  1
*Elset, elset=Part-1-1_Set-3, generate
 1,  4,  1
*Nset, nset=Part-1-1_Set-4, generate
 1,  5,  1
*Elset, elset=Part-1-1_Set-4, generate
 1,  4,  1
*Nset, nset=Part-1-1_beam_node
 1,
** Section: Section-1  Profile: Profile-1
*Beam Section, elset=Part-1-1_Set-3, material=Material-1, temperature=GRADIENTS, section=I
55., 110., 100., 100., 10., 10., 10.
1.,6.12323e-17,-3.7494e-33
** ----------------------------------------------------------------
**
** PART INSTANCE: Part-2-1
**
*System
          0.,          0.,          0.,          1.,          0.,          0.
          0., 6.12323399573677e-17,          1.
*Node
      6,           0.,         -50.,        1000.
      7,           0.,         -50.,           0.
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*Element, type=S4R
  5,    6,   18,  662,  223
  6,   18,   19,  663,  662
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*Nset, nset=Part-2-1_Set-14, generate
    6,  3136,     1
*Elset, elset=Part-2-1_Set-14, generate
    5,  3004,     1
*Nset, nset=Part-2-1_interf_nodes_1
   6,   9,  10,  12,  14,  17
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*Elset, elset=Part-2-1_interf-elem
    5,  105,  205,  305,  405,  604
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** Section: Section-2
*Shell Section, elset=Part-2-1_Set-14, material=Material-1
10., 5
** ----------------------------------------------------------------
**
** PART INSTANCE: full_beam-1
**
*System
        500.,          0.,          0.,        501.,          0.,          0.
*Node
   3137,           0.,         -50.,        2000.
   3138,           0.,         -50.,           0.
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*Element, type=S4R
3005, 3137, 3149, 4393, 3554
3006, 3149, 3150, 4394, 4393
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*Nset, nset=full_beam-1_Set-14, generate
 3137,  9367,     1
*Elset, elset=full_beam-1_Set-14, generate
 3005,  9004,     1
*Nset, nset=full_beam-1_FS-interf-nodes
 3248, 3451, 3658, 3879, 4082, 4289
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*Elset, elset=full_beam-1_FS-interf-elem
 3105, 3305, 3505, 3705, 3905, 4104
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** Section: Section-2
*Shell Section, elset=full_beam-1_Set-14, material=Material-1
10., 5
** ----------------------------------------------------------------
**
** PART INSTANCE: Part-2-1-lin-2-1
**
*System
       1000.,          0.,          0.,       1001.,          0.,          0.
*Node
   9368,           0.,         -50.,        1000.
   9369,           0.,         -50.,           0.
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*Element, type=S4R
9005,  9368,  9380, 10024,  9585
9006,  9380,  9381, 10025, 10024
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*Nset, nset=Part-2-1-lin-2-1_Set-14, generate
 9368, 12498,     1
*Elset, elset=Part-2-1-lin-2-1_Set-14, generate
 9005, 12004,     1
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** Section: Section-2
*Shell Section, elset=Part-2-1-lin-2-1_Set-14, material=Material-1
10., 5
** ----------------------------------------------------------------
**
** PART INSTANCE: Part-1-1-lin-2-1
**
*System
       1000.,          0.,       1000.,       1000.,          0.,       1001.
       1000.,          1.,       1000.
*Node
  12499,           0.,           0.,           0.
  12500,         250.,           0.,           0.
  12501,         500.,           0.,           0.
  12502,         750.,           0.,           0.
  12503,        1000.,           0.,           0.
*Element, type=B31OS
12005, 12499, 12500
12006, 12500, 12501
12007, 12501, 12502
12008, 12502, 12503
*Nset, nset=Part-1-1-lin-2-1_Set-3, generate
12499, 12503,  1
*Elset, elset=Part-1-1-lin-2-1_Set-3, generate
12005, 12008,  1
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** Section: Section-1  Profile: Profile-1
*Beam Section, elset=Part-1-1-lin-2-1_Set-3, material=Material-1, temperature=GRADIENTS, section=I
55., 110., 100., 100., 10., 10., 10.
1.,0.,-6.12323e-17
** ----------------------------------------------------------------
**
** PART INSTANCE: Part-1-1-lin-2-1-1
**
*System
       1500.,       1000.,          0.,       1500.,       1001., 6.12323399573677e-17
       1500.,       1000.,         -1.
*Node
  12504,           0.,           0.,           0.
  12505,         250.,           0.,           0.
  12506,         500.,           0.,           0.
  12507,         750.,           0.,           0.
  12508,        1000.,           0.,           0.
*Element, type=B31OS
12009, 12504, 12505
12010, 12505, 12506
12011, 12506, 12507
12012, 12507, 12508
*Nset, nset=Part-1-1-lin-2-1-1_Set-3, generate
12504, 12508,  1
*Elset, elset=Part-1-1-lin-2-1-1_Set-3, generate
12009, 12012,  1
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** Section: Section-1  Profile: Profile-1
*Beam Section, elset=Part-1-1-lin-2-1-1_Set-3, material=Material-1, temperature=GRADIENTS, section=I
55., 110., 100., 100., 10., 10., 10.
1.,-6.12323e-17,-3.7494e-33
** ----------------------------------------------------------------
**
** PART INSTANCE: Part-2-1-lin-2-1-1
**
*System
       1500.,          0.,          0.,       1501.,          0.,          0.
       1500., 6.12323399573677e-17,         -1.
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*Elset, elset=Part-2-1-lin-2-1-1_Set-14, generate
12013, 15012,     1
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** Section: Section-2
*Shell Section, elset=Part-2-1-lin-2-1-1_Set-14, material=Material-1
10., 5
*System
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*Nset, nset=Set-14
15640,15641,15643,15644
*Nset, nset=Set-22
3148,
*Nset, nset=Set-22
12503,
*Nset, nset=Set-23
 5,
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*Nset, nset=m_Set-17
12499,
*Nset, nset=mpc_load_nodes
 5,
*Nset, nset=mpc_load_nodes
12508,
*Nset, nset=s_Set-17
9368,9371,9372,9374,9376,9379
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*Elset, elset=s_Set-17
 9005, 9105, 9205, 9305, 9405, 9604
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*Nset, nset=t_Set-2
   7,   8,  11,  13,  15,  16
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*Elset, elset=t_Set-2
  104,  204,  304,  404,  504,  505
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*Nset, nset=t_Set-9
 3138, 3139, 3142, 3144, 3146, 3147
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*Elset, elset=t_Set-9
 3204, 3404, 3604, 3804, 4004, 4005
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*Nset, nset=t_Set-11
 3137, 3140, 3141, 3143, 3145, 3148
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*Elset, elset=t_Set-11
 3005, 3205, 3405, 3605, 3805, 4204
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*Nset, nset=t_Set-15
9369,9370,9373,9375,9377,9378
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*Elset, elset=t_Set-15
 9104, 9204, 9304, 9404, 9504, 9505
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*Nset, nset=t_Set-19
12510,12511,12514,12516,12518,12519
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*Elset, elset=t_Set-19
12112,12212,12312,12412,12512,12513
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*Nset, nset=_PickedSet9
15640,
*Nset, nset=_PickedSet26
15641,
*Nset, nset=_PickedSet29
15642,
*Nset, nset=_PickedSet39
15643,
*Nset, nset=_PickedSet51
15644,
*Surface, type=NODE, name=s_Set-17_CNS_
s_Set-17, 1.
** Constraint: Constraint-1
*Rigid Body, ref node=_PickedSet9, tie nset=t_Set-2
** Constraint: Constraint-2
*Rigid Body, ref node=_PickedSet26, tie nset=t_Set-9
** Constraint: Constraint-3
*Rigid Body, ref node=_PickedSet29, tie nset=t_Set-11
** Constraint: Constraint-4
*Rigid Body, ref node=_PickedSet39, tie nset=t_Set-15
** Constraint: Constraint-5
*Coupling, constraint name=Constraint-5, ref node=m_Set-17, surface=s_Set-17_CNS_
*Kinematic
1, 1
2, 2
3, 3
** Constraint: Constraint-6
*Rigid Body, ref node=_PickedSet51, tie nset=t_Set-19
*MPC, MODE=NODE, USER
27, 6, 1
*MPC, MODE=NODE, USER
27, 9, 1
*MPC, MODE=NODE, USER
27, 10, 1
*MPC, MODE=NODE, USER
27, 12, 1
*MPC, MODE=NODE, USER
27, 14, 1
*MPC, MODE=NODE, USER
27, 17, 1
*MPC, MODE=NODE, USER
27, 220, 1
*MPC, MODE=NODE, USER
27, 221, 1
*MPC, MODE=NODE, USER
27, 222, 1
*MPC, MODE=NODE, USER
27, 223, 1
*MPC, MODE=NODE, USER
27, 224, 1
*MPC, MODE=NODE, USER
27, 225, 1
*MPC, MODE=NODE, USER
27, 226, 1
*MPC, MODE=NODE, USER
27, 227, 1
*MPC, MODE=NODE, USER
27, 331, 1
*MPC, MODE=NODE, USER
27, 332, 1
*MPC, MODE=NODE, USER
27, 333, 1
*MPC, MODE=NODE, USER
27, 334, 1
*MPC, MODE=NODE, USER
27, 335, 1
*MPC, MODE=NODE, USER
27, 336, 1
*MPC, MODE=NODE, USER
27, 337, 1
*MPC, MODE=NODE, USER
27, 338, 1
*MPC, MODE=NODE, USER
27, 339, 1
*MPC, MODE=NODE, USER
27, 448, 1
*MPC, MODE=NODE, USER
27, 449, 1
*MPC, MODE=NODE, USER
27, 450, 1
*MPC, MODE=NODE, USER
27, 451, 1
*MPC, MODE=NODE, USER
27, 658, 1
*MPC, MODE=NODE, USER
27, 659, 1
*MPC, MODE=NODE, USER
27, 660, 1
*MPC, MODE=NODE, USER
27, 661, 1
*MPC, MODE=NODE, USER
17, 12509, 12504
*MPC, MODE=NODE, USER
17, 12512, 12504
*MPC, MODE=NODE, USER
17, 12513, 12504
*MPC, MODE=NODE, USER
17, 12515, 12504
*MPC, MODE=NODE, USER
17, 12517, 12504
*MPC, MODE=NODE, USER
17, 12520, 12504
*MPC, MODE=NODE, USER
17, 12723, 12504
*MPC, MODE=NODE, USER
17, 12724, 12504
*MPC, MODE=NODE, USER
17, 12725, 12504
*MPC, MODE=NODE, USER
17, 12726, 12504
*MPC, MODE=NODE, USER
17, 12727, 12504
*MPC, MODE=NODE, USER
17, 12728, 12504
*MPC, MODE=NODE, USER
17, 12729, 12504
*MPC, MODE=NODE, USER
17, 12730, 12504
*MPC, MODE=NODE, USER
17, 12834, 12504
*MPC, MODE=NODE, USER
17, 12835, 12504
*MPC, MODE=NODE, USER
17, 12836, 12504
*MPC, MODE=NODE, USER
17, 12837, 12504
*MPC, MODE=NODE, USER
17, 12838, 12504
*MPC, MODE=NODE, USER
17, 12839, 12504
*MPC, MODE=NODE, USER
17, 12840, 12504
*MPC, MODE=NODE, USER
17, 12841, 12504
*MPC, MODE=NODE, USER
17, 12842, 12504
*MPC, MODE=NODE, USER
17, 12951, 12504
*MPC, MODE=NODE, USER
17, 12952, 12504
*MPC, MODE=NODE, USER
17, 12953, 12504
*MPC, MODE=NODE, USER
17, 12954, 12504
*MPC, MODE=NODE, USER
17, 13161, 12504
*MPC, MODE=NODE, USER
17, 13162, 12504
*MPC, MODE=NODE, USER
17, 13163, 12504
*MPC, MODE=NODE, USER
17, 13164, 12504
**
** MATERIALS
**
*Material, name=Material-1
*Elastic
200000., 0.3
*Amplitude, name=warp_fun_amp
0.0, 1.0
1.E6, 1.0
**
** BOUNDARY CONDITIONS
**
** Name: BC-1 Type: Displacement/Rotation
*Boundary
Set-14, 1, 1
Set-14, 2, 2
Set-14, 3, 3
Set-14, 4, 4
Set-14, 5, 5
Set-14, 6, 6
** ----------------------------------------------------------------
**
** STEP: Step-1
**
*Step, name=Step-1, nlgeom=YES, inc=1000
*Static
0.1, 1., 1e-05, 0.1
**
** LOADS
**
** Name: fy-y-nl   Type: Concentrated force
*Cload
Set-23, 2, 0.
Set-23, 3, 1000.
*Field, variable=1, amplitude=warp_fun_amp
6, -0.0
9, -2500.0
10, 2500.0
12, 0.0
14, -2500.0
17, 2500.0
220, -2000.0
221, -1500.0
222, -1000.0
223, -500.0
224, 500.0
225, 1000.0
226, 1500.0
227, 2000.0
331, 0.0
332, 0.0
333, 0.0
334, 0.0
335, 0.0
336, -0.0
337, -0.0
338, -0.0
339, -0.0
448, -500.0
449, -1000.0
450, -1500.0
451, -2000.0
658, 2000.0
659, 1500.0
660, 1000.0
661, 500.0
*Field, variable=1, amplitude=warp_fun_amp
12509, -0.0
12512, -2500.0
12513, 2500.0
12515, 0.0
12517, -2500.0
12520, 2500.0
12723, -2000.0
12724, -1500.0
12725, -1000.0
12726, -500.0
12727, 500.0
12728, 1000.0
12729, 1500.0
12730, 2000.0
12834, 0.0
12835, 0.0
12836, 0.0
12837, 0.0
12838, 0.0
12839, -0.0
12840, -0.0
12841, -0.0
12842, -0.0
12951, -500.0
12952, -1000.0
12953, -1500.0
12954, -2000.0
13161, 2000.0
13162, 1500.0
13163, 1000.0
13164, 500.0
*Field, variable=2, amplitude=warp_fun_amp
1, -0.0
12504, -0.0
*Field, variable=3, amplitude=warp_fun_amp
1, 1.0
12504, 1.0
*Field, variable=4, amplitude=warp_fun_amp
1, 0.0
12504, 0.0
**
** OUTPUT REQUESTS
**
*Restart, write, frequency=0
**
** FIELD OUTPUT: F-Output-1
**
*Output, field
*Node Output
CF, RF, U
*Element Output, directions=YES
FV, LE, PE, PEEQ, PEMAG, S
*Contact Output
CDISP, CSTRESS
**
** HISTORY OUTPUT: H-Output-1
**
*Output, history, variable=PRESELECT
*End Step
