*Heading
** Job name: W24X146_Dynamic-WIKC-4500 Model name: W24X146_Dynamic-WIKC-4500
** Generated by: Abaqus/CAE 6.14-1
*Preprint, echo=NO, model=NO, history=NO, contact=NO
** ----------------------------------------------------------------
**
** PART INSTANCE: top_segment
**
*Node
      1,           0.,  -299.649994,           0.
      2,           0.,  -299.649994,         900.
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*Element, type=S4R
  1,   1,  13, 317,  94
  2,  13,  14, 318, 317
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*Nset, nset=top_segment__PickedSet2
    1,    2,    3,    4,    5,    6
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*Elset, elset=top_segment__PickedSet2, generate
    1,  1008,     1
*Nset, nset=top_segment__G3
    1,    2,    7,    8,   13,   14
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*Elset, elset=top_segment__G3, generate
 1009,  1872,     1
*Nset, nset=top_segment_shell_top_nodes
   2,   3,   6,   8,   9,  12
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*Elset, elset=top_segment_shell_top_nodes
   36,   72,  108,  144,  180,  216
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*Nset, nset=top_segment_shell_bot_nodes
   1,   4,   5,   7,  10,  11
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*Elset, elset=top_segment_shell_bot_nodes
    1,   37,   73,  109,  145,  181
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** Section: flange_section
*Shell Section, elset=top_segment__PickedSet2, material=steel_chabouche-flange-orig, controls=EC-1
27.7, 5
** Section: web_section
*Shell Section, elset=top_segment__G3, material=steel_chabouche-web-orig, controls=EC-1
16.5, 5
** ----------------------------------------------------------------
**
** PART INSTANCE: shell_segment-1
**
*System
          0.,          0.,       3600.,          1.,          0.,       3600.
*Node
   1962,           0.,  -299.649994,           0.
   1963,           0.,  -299.649994,         900.
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*Element, type=S4R
1873, 1962, 1974, 2278, 2055
1874, 1974, 1975, 2279, 2278
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*Nset, nset=shell_segment-1__PickedSet2
 1962, 1963, 1964, 1965, 1966, 1967
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*Elset, elset=shell_segment-1__PickedSet2, generate
 1873,  2880,     1
*Nset, nset=shell_segment-1__G3
 1962, 1963, 1968, 1969, 1974, 1975
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*Elset, elset=shell_segment-1__G3, generate
 2881,  3744,     1
*Nset, nset=shell_segment-1_shell_top_nodes
1963,1964,1967,1969,1970,1973
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*Elset, elset=shell_segment-1_shell_top_nodes
 1908, 1944, 1980, 2016, 2052, 2088
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** Section: flange_section
*Shell Section, elset=shell_segment-1__PickedSet2, material=steel_chabouche-flange-orig, controls=EC-1
27.7, 5
** Section: web_section
*Shell Section, elset=shell_segment-1__G3, material=steel_chabouche-web-orig, controls=EC-1
16.5, 5
** ----------------------------------------------------------------
**
** PART INSTANCE: beam_segment-1
**
*System
          0.,          0.,       1220., 6.12323399573677e-17,          0.,       1221.
          0.,          1.,       1220.
*Node
   3923,        -320.,           0.,           0.
   3924,        1030.,           0.,           0.
   3925,        2380.,           0.,           0.
   3926,         130.,           0.,           0.
   3927,         580.,           0.,           0.
   3928,        1480.,           0.,           0.
   3929,        1930.,           0.,           0.
*Element, type=B31OS
3745, 3923, 3926
3746, 3926, 3927
3747, 3927, 3924
3748, 3924, 3928
3749, 3928, 3929
3750, 3929, 3925
*Nset, nset=beam_segment-1_beam_node_bot
3923,
*Nset, nset=beam_segment-1_beam_node_top
3925,
*Nset, nset=beam_segment-1_beam_node_mid
3924,
*Nset, nset=beam_segment-1_Set-1, generate
3923, 3929,  1
*Elset, elset=beam_segment-1_Set-1, generate
3745, 3750,  1
*Nset, nset=beam_segment-1_Set-2, generate
3923, 3929,  1
*Elset, elset=beam_segment-1_Set-2, generate
3745, 3750,  1
** Section: beam_section  Profile: W24X146
*Beam Section, elset=beam_segment-1_Set-1, material=steel_chabouche-flange-orig, temperature=GRADIENTS, section=I
313.5, 627., 328., 328., 27.7, 27.7, 16.5
1.,0.,-6.12323e-17
*System
*Node
   3930,           0.,           0.,        4500.
*Node
   3931,           0.,           0.,           0.
*Nset, nset=Set-10
3930,
*Nset, nset=Set-11
3930,
*Nset, nset=Set-12
3930,
*Nset, nset=Set-13
3931,
*Nset, nset=base_node
3931,
*Nset, nset=control_node
3930,
*Nset, nset=_PickedSet7
3930,
*Nset, nset=_PickedSet8
3931,
*Nset, nset=_PickedSet12
3931,
*Nset, nset=_PickedSet13
3930,
*Elset, elset=_s_Surf-1_SNEG, generate
    1,  1872,     1
*Surface, type=ELEMENT, name=s_Surf-1
_s_Surf-1_SNEG, SNEG
** Constraint: rigid_base
*Rigid Body, ref node=_PickedSet8, tie nset=top_segment_shell_bot_nodes
** Constraint: top_plate
*Rigid Body, ref node=_PickedSet7, tie nset=shell_segment-1_shell_top_nodes
*Element, type=MASS, elset=Set-12_Inertia-1_
3751, 3930
*Mass, elset=Set-12_Inertia-1_, type=ANISOTROPIC, alpha=0.168
0., 1376.17, 0.
**
** ELEMENT CONTROLS
**
*Section Controls, name=EC-1, hourglass=ENHANCED
1., 1., 1.
*Amplitude, name=nr94cnp, definition=EQUALLY SPACED, fixed interval=0.01
             0.,        -0.00122,        -0.00117,         -0.0012,        -0.00116,        -0.00119,        -0.00113,        -0.00114
       -0.00109,        -0.00111,        -0.00106,        -0.00112,        -0.00108,         -0.0011,        -0.00105,        -0.00102
      -0.000921,       -0.000986,        -0.00102,        -0.00105,        -0.00098,       -0.000905,       -0.000778,       -0.000815
      -0.000827,       -0.000995,       -0.000757,       -0.000679,       -0.000628,        -0.00066,       -0.000555,       -0.000798
      -0.000854,       -0.000605,       -0.000285,       -9.23e-05,         8.3e-05,        3.81e-05,        7.05e-05,       -0.000752
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       -0.00134,        -0.00133,        -0.00132,        -0.00131,         -0.0013,        -0.00129,        -0.00127,        -0.00126
**
** MATERIALS
**
*Material, name=UVC_flange
*Density
 8e-12,
*Depvar
     10,
*User Material, constants=11
200000.,    0.3, 373.72, 141.47,   15.2, 135.95, 211.16, 25621.
 235.12, 942.18,   3.16
*Material, name=UVC_web
*Density
 8e-12,
*Depvar
     10,
*User Material, constants=11
200000.,    0.3, 378.83, 122.63,  19.74, 143.49, 248.14, 31638.
 277.32, 1548.6,   9.04
*Material, name=steel_chabouche-flange
*Density
 8e-12,
*Elastic
198600., 0.3
*Plastic, hardening=COMBINED, datatype=PARAMETERS, number backstresses=2
 339.8, 11608.2,   145.2,  1026.3,     4.7
*Cyclic Hardening, parameters
 339.8, 100.7,    8.
*Material, name=steel_chabouche-flange-orig
*Density
 8e-12,
*Elastic
180000., 0.3
*Plastic, hardening=COMBINED, datatype=PARAMETERS, number backstresses=2
 318.5, 11608.2,   145.2,  1026.3,     4.7
*Cyclic Hardening, parameters
 318.5, 100.7,    8.
*Material, name=steel_chabouche-web
*Density
 8e-12,
*Elastic
185200., 0.3
*Plastic, hardening=COMBINED, datatype=PARAMETERS, number backstresses=2
 369.2, 8716.1,  118.5, 1182.1,    5.2
*Cyclic Hardening, parameters
 369.2, 77.5,  9.3
*Material, name=steel_chabouche-web-orig
*Density
 8e-12,
*Elastic
183000., 0.3
*Plastic, hardening=COMBINED, datatype=PARAMETERS, number backstresses=2
 339.2, 8716.1,  118.5, 1182.1,    5.2
*Cyclic Hardening, parameters
 339.2, 77.5,  9.3
**
** BOUNDARY CONDITIONS
**
** Name: bot_fix Type: Displacement/Rotation
*Boundary
_PickedSet12, 1, 1
_PickedSet12, 2, 2
_PickedSet12, 3, 3
_PickedSet12, 4, 4
_PickedSet12, 5, 5
_PickedSet12, 6, 6
** Name: top_fix Type: Displacement/Rotation
*Boundary
Set-11, 1, 1
Set-11, 4, 4
Set-11, 5, 5
Set-11, 6, 6
*IMPERFECTION, input=W24X146_Dynamic-KC-4500-Imp.txt
** ----------------------------------------------------------------
**
** STEP: gravity_loading
**
*Step, name=gravity_loading, nlgeom=YES, inc=10000
*Static
0.1, 1., 1e-35, 0.1
**
** LOADS
**
** Name: gravity_load   Type: Concentrated force
*Cload
_PickedSet13, 3, -2.1e+06
** Name: mid_torque-half   Type: Moment
*Cload
beam_segment-1_beam_node_mid, 6, 3e+07
**
** OUTPUT REQUESTS
**
*Restart, write, frequency=0
**
** FIELD OUTPUT: F-Output-1
**
*Output, field, variable=PRESELECT
**
** HISTORY OUTPUT: H-Output-1
**
*Output, history, variable=PRESELECT
*End Step
** ----------------------------------------------------------------
**
** STEP: dynamic_loading
**
*Step, name=dynamic_loading, nlgeom=YES, inc=100000000
*Dynamic
0.01,25.,1e-08,0.01
**
** BOUNDARY CONDITIONS
**
** Name: base_accel Type: Acceleration/Angular acceleration
*Boundary, op=NEW, amplitude=nr94cnp, type=ACCELERATION
Set-13, 2, 2, 9810.
** Name: bot_fix Type: Displacement/Rotation
*Boundary, op=NEW
_PickedSet12, 1, 1
_PickedSet12, 3, 3
_PickedSet12, 4, 4
_PickedSet12, 5, 5
_PickedSet12, 6, 6
** Name: top_fix Type: Displacement/Rotation
*Boundary, op=NEW
Set-11, 1, 1
Set-11, 4, 4
Set-11, 5, 5
Set-11, 6, 6
**
** OUTPUT REQUESTS
**
*Restart, write, frequency=0
**
** FIELD OUTPUT: F-Output-1
**
*Output, field, variable=PRESELECT, time interval=0.01
**
** HISTORY OUTPUT: H-Output-1
**
*Output, history, variable=PRESELECT, frequency=1
*End Step
