*Heading
** Job name: W24X84_Dynamic-NLBIKC Model name: W24X84_Dynamic-EQN-NL-Mod-L3-New
** Generated by: Abaqus/CAE 6.14-1
*Preprint, echo=NO, model=NO, history=NO, contact=NO
** ----------------------------------------------------------------
**
** PART INSTANCE: top_segment
**
*Node
      1,           0.,  -296.200012,           0.
      2,           0.,  -296.200012,        1650.
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*Element, type=S4R
  1,   1,  13, 481, 150
  2,  13,  14, 482, 481
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*Nset, nset=top_segment__PickedSet2
    1,    2,    3,    4,    5,    6
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*Elset, elset=top_segment__PickedSet2, generate
    1,  1320,     1
*Nset, nset=top_segment__G3
    1,    2,    7,    8,   13,   14
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*Elset, elset=top_segment__G3, generate
 1321,  2904,     1
*Nset, nset=top_segment_shell_top_nodes
   2,   3,   6,   8,   9,  12
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*Nset, nset=top_segment_shell_bot_nodes
   1,   4,   5,   7,  10,  11
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** Section: flange_section
*Shell Section, elset=top_segment__PickedSet2, material=steel_chabouche-flange, controls=EC-1
22., 5
** Section: web_section
*Shell Section, elset=top_segment__G3, material=steel_chabouche-web, controls=EC-1
13., 5
** ----------------------------------------------------------------
**
** PART INSTANCE: Part-2-1
**
*System
          0.,          0.,        850., 6.12323399573677e-17,          0.,        851.
          0.,          1.,        850.
*Node
   3016,         800.,           0.,           0.
   3017,        1650.,           0.,           0.
   3018,        2500.,           0.,           0.
   3019,        1225.,           0.,           0.
   3020,        2075.,           0.,           0.
*Element, type=B31OS
2905, 3016, 3019
2906, 3019, 3017
2907, 3017, 3020
2908, 3020, 3018
*Nset, nset=Part-2-1_Set-1, generate
3016, 3020,  1
*Elset, elset=Part-2-1_Set-1, generate
2905, 2908,  1
*Nset, nset=Part-2-1_Set-2, generate
3016, 3020,  1
*Elset, elset=Part-2-1_Set-2, generate
2905, 2908,  1
** Section: beam_section  Profile: w24x84
*Beam Section, elset=Part-2-1_Set-1, material=steel_chabouche-flange, temperature=GRADIENTS, section=I
306., 612., 229., 229., 19.6, 19.6, 11.9
1.,0.,-6.12323e-17
** ----------------------------------------------------------------
**
** PART INSTANCE: shell_segment-1
**
*System
          0.,          0.,       3350.,          1.,          0.,       3350.
*Node
   3021,           0.,  -296.200012,           0.
   3022,           0.,  -296.200012,        1650.
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*Element, type=S4R
2909, 3021, 3033, 3501, 3170
2910, 3033, 3034, 3502, 3501
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*Nset, nset=shell_segment-1__PickedSet2
 3021, 3022, 3023, 3024, 3025, 3026
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*Elset, elset=shell_segment-1__PickedSet2, generate
 2909,  4228,     1
*Nset, nset=shell_segment-1__G3
 3021, 3022, 3027, 3028, 3033, 3034
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*Elset, elset=shell_segment-1__G3, generate
 4229,  5812,     1
*Nset, nset=shell_segment-1_shell_top_nodes
3022,3023,3026,3028,3029,3032
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*Nset, nset=shell_segment-1_shell_bot_nodes
3021,3024,3025,3027,3030,3031
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** Section: flange_section
*Shell Section, elset=shell_segment-1__PickedSet2, material=steel_chabouche-flange, controls=EC-1
22., 5
** Section: web_section
*Shell Section, elset=shell_segment-1__G3, material=steel_chabouche-web, controls=EC-1
13., 5
*System
*Node
   6036,           0.,           0.,        5000.
*Node
   6037,           0.,           0.,           0.
*Nset, nset=Set-10
6036,
*Nset, nset=Set-11
6036,
*Nset, nset=Set-12
6036,
*Nset, nset=Set-13
6037,
*Nset, nset=Set-16
3017,
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*Nset, nset=_PickedSet7
6036,
*Nset, nset=_PickedSet8
6037,
*Nset, nset=_PickedSet12
6037,
*Nset, nset=_PickedSet13
6036,
*Elset, elset=_s_Surf-1_SNEG, generate
    1,  2904,     1
*Surface, type=ELEMENT, name=s_Surf-1
_s_Surf-1_SNEG, SNEG
** Constraint: rigid_base
*Rigid Body, ref node=_PickedSet8, tie nset=top_segment_shell_bot_nodes
** Constraint: top_plate
*Rigid Body, ref node=_PickedSet7, tie nset=shell_segment-1_shell_top_nodes
*Element, type=MASS, elset=Set-12_Inertia-1_
5813, 6036
*Mass, elset=Set-12_Inertia-1_, type=ANISOTROPIC, alpha=0.168
0., 956., 0.
**
** ELEMENT CONTROLS
**
*Section Controls, name=EC-1, hourglass=ENHANCED
1., 1., 1.
*Amplitude, name=nr94cnp, definition=EQUALLY SPACED, fixed interval=0.01
             0.,        -0.00122,        -0.00117,         -0.0012,        -0.00116,        -0.00119,        -0.00113,        -0.00114
       -0.00109,        -0.00111,        -0.00106,        -0.00112,        -0.00108,         -0.0011,        -0.00105,        -0.00102
      -0.000921,       -0.000986,        -0.00102,        -0.00105,        -0.00098,       -0.000905,       -0.000778,       -0.000815
      -0.000827,       -0.000995,       -0.000757,       -0.000679,       -0.000628,        -0.00066,       -0.000555,       -0.000798
      -0.000854,       -0.000605,       -0.000285,       -9.23e-05,         8.3e-05,        3.81e-05,        7.05e-05,       -0.000752
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       -0.00134,        -0.00133,        -0.00132,        -0.00131,         -0.0013,        -0.00129,        -0.00127,        -0.00126
**
** MATERIALS
**
*Material, name=UVC_flange
*Density
 8e-12,
*Depvar
     10,
*User Material, constants=11
200000.,    0.3, 373.72, 141.47,   15.2, 135.95, 211.16, 25621.
 235.12, 942.18,   3.16
*Material, name=UVC_web
*Density
 8e-12,
*Depvar
     10,
*User Material, constants=11
200000.,    0.3, 378.83, 122.63,  19.74, 143.49, 248.14, 31638.
 277.32, 1548.6,   9.04
*Material, name=steel_chabouche-flange
*Density
 8e-12,
*Elastic
198600., 0.3
*Plastic, hardening=COMBINED, datatype=PARAMETERS, number backstresses=2
 339.8, 11608.2,   145.2,  1026.3,     4.7
*Cyclic Hardening, parameters
 339.8, 100.7,    8.
*Material, name=steel_chabouche-web
*Density
 8e-12,
*Elastic
185200., 0.3
*Plastic, hardening=COMBINED, datatype=PARAMETERS, number backstresses=2
 369.2, 8716.1,  118.5, 1182.1,    5.2
*Cyclic Hardening, parameters
 369.2, 77.5,  9.3
**
** BOUNDARY CONDITIONS
**
** Name: bot_fix Type: Displacement/Rotation
*Boundary
_PickedSet12, 1, 1
_PickedSet12, 2, 2
_PickedSet12, 3, 3
_PickedSet12, 4, 4
_PickedSet12, 5, 5
_PickedSet12, 6, 6
** Name: top_fix Type: Displacement/Rotation
*Boundary
Set-11, 1, 1
Set-11, 4, 4
Set-11, 5, 5
Set-11, 6, 6
** ----------------------------------------------------------------
**
** STEP: gravity_loading
**
*Step, name=gravity_loading, nlgeom=YES, inc=10000
*Static
0.1, 1., 1e-35, 0.1
**
** LOADS
**
** Name: gravity_load   Type: Concentrated force
*Cload
_PickedSet13, 3, -1.2e+06
** Name: mid_torque   Type: Moment
*Cload
Set-16, 6, 1e+07
**
** OUTPUT REQUESTS
**
*Restart, write, frequency=0
**
** FIELD OUTPUT: F-Output-1
**
*Output, field, variable=PRESELECT
**
** HISTORY OUTPUT: H-Output-1
**
*Output, history, variable=PRESELECT
*End Step
** ----------------------------------------------------------------
**
** STEP: dynamic_loading
**
*Step, name=dynamic_loading, nlgeom=YES, inc=100000000
*Dynamic
0.01,25.,1e-08,0.01
**
** BOUNDARY CONDITIONS
**
** Name: base_accel Type: Acceleration/Angular acceleration
*Boundary, op=NEW, amplitude=nr94cnp, type=ACCELERATION
Set-13, 2, 2, 9810.
** Name: bot_fix Type: Displacement/Rotation
*Boundary, op=NEW
_PickedSet12, 1, 1
_PickedSet12, 3, 3
_PickedSet12, 4, 4
_PickedSet12, 5, 5
_PickedSet12, 6, 6
** Name: top_fix Type: Displacement/Rotation
*Boundary, op=NEW
Set-11, 1, 1
Set-11, 4, 4
Set-11, 5, 5
Set-11, 6, 6
**
** OUTPUT REQUESTS
**
*Restart, write, frequency=0
**
** FIELD OUTPUT: F-Output-1
**
*Output, field, time interval=0.01
*Node Output
A, CF, RF, U, V
*Element Output, directions=YES
FV, LE, PE, PEEQ, PEMAG, S
*Contact Output
CDISP, CSTRESS
**
** HISTORY OUTPUT: H-Output-1
**
*Output, history, variable=PRESELECT, frequency=1
*End Step
